# Задане 1
ORIGIN := 1  # Пункт 1
n := 7
N := 6
f(i, j) := N
b := matrix(n, 1, f)
c(i, j) := 0.1*N*(i + 1)*(j + 1)
a(i, j) := 3/(c(i, j)^4 - 4*c(i, j)^3)
A := matrix(n, n, a)
A = [
    -4.08497, -0.62004, -0.23382, -0.135634, -0.111111, -0.160751, 0.202462;
    -0.62004, -0.135634, -0.160751, 0.0339084, 0.00694444, 0.00251173, 0.00115035;
    -0.23382, -0.160751, 0.0136086, 0.00251173, 0.000823045, 0.00035022, 0.000174386;
    -0.135634, 0.0339084, 0.00251173, 0.000605508, 0.000217014, 9.66052e-5, 4.94292e-5;
    -0.111111, 0.00694444, 0.000823045, 0.000217014, 8.08081e-5, 3.67431e-5, 1.90552e-5;
    -0.160751, 0.00251173, 0.00035022, 9.66052e-5, 3.67431e-5, 1.6914e-5, 8.84268e-6;
    0.202462, 0.00115035, 0.000174386, 4.94292e-5, 1.90552e-5, 8.84268e-6, 4.64778e-6
]
b = [6; 6; 6; 6; 6; 6; 6]
x := lsolve(A, b)
x = [4.22831; 863.583; 116141; 5362760; -51317232; 64649180; 26896874]
# Пункт 2
condi(A) = 198429344
# Пункт 3
δ := 0.1
Δ := N*δ
Δ = 0.6
k := 1 .. n
i := 1 .. n
B[i, k] := if(i == k, b[i] + Δ, b[i])
B = [
    6.6, 6, 6, 6, 6, 6, 6;
    6, 6.6, 6, 6, 6, 6, 6;
    6, 6, 6.6, 6, 6, 6, 6;
    6, 6, 6, 6.6, 6, 6, 6;
    6, 6, 6, 6, 6.6, 6, 6;
    6, 6, 6, 6, 6, 6.6, 6;
    6, 6, 6, 6, 6, 6, 6.6
]
A = [
    -4.08497, -0.62004, -0.23382, -0.135634, -0.111111, -0.160751, 0.202462;
    -0.62004, -0.135634, -0.160751, 0.0339084, 0.00694444, 0.00251173, 0.00115035;
    -0.23382, -0.160751, 0.0136086, 0.00251173, 0.000823045, 0.00035022, 0.000174386;
    -0.135634, 0.0339084, 0.00251173, 0.000605508, 0.000217014, 9.66052e-5, 4.94292e-5;
    -0.111111, 0.00694444, 0.000823045, 0.000217014, 8.08081e-5, 3.67431e-5, 1.90552e-5;
    -0.160751, 0.00251173, 0.00035022, 9.66052e-5, 3.67431e-5, 1.6914e-5, 8.84268e-6;
    0.202462, 0.00115035, 0.000174386, 4.94292e-5, 1.90552e-5, 8.84268e-6, 4.64778e-6
]
X[:, k] := lsolve(A, B[:, k])
X = [
    4.22831, 4.22831, 4.22806, 4.20546, 4.68738, 2.43731, 6.00616;
    863.583, 863.582, 862.597, 896.609, 697.668, 1025.4, 921.995;
    116141, 116140, 116209, 118130, 100151, 134488, 123341;
    5362760, 5362793, 5364749, 5438888, 4693471, 6166180, 5686753;
    -51317231, -51317397, -51333221, -51986520, -45203865, -58813031, -54381078;
    64649178, 64649342, 64667527, 65452600, 57153380, 73953962, 68483187;
    26896875, 26896932, 26904074, 27220867, 23833027, 30730881, 28485146
]
x = [4.22831; 863.583; 116141; 5362760; -51317232; 64649180; 26896874]
R[i, k] := x[i] - X[i, k]
R[i, k] := |R[i, k]|
xm[i] := |x[i]|
d[k] := max(R[:, k])/max(xm)
transpose(d) = [2.77033e-8, 2.56638e-6, 0.000283796, 0.0124274, 0.115946, 0.143927, 0.0593048]
# Пункт 4
com := [0, 1, 2, 3, 4, 5]
H := histogram(transpose(com), d)
H = [0.5, 7; 1.5, 0; 2.5, 0; 3.5, 0; 4.5, 0]
H[:, 1] = [0.5; 1.5; 2.5; 3.5; 4.5]
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# Пункт 5
condi(A) = 198429344
RB[i, k] := b[i] - B[i, k]
RB[i, k] := |RB[i, k]|
bm[i] := |b[i]|
δ[k] := max(RB[:, k])/max(bm)
transpose(δ) = [0.1, 0.1, 0.1, 0.1, 0.1, 0.1, 0.1]
δx[k] := condi(A)*δ[k]
Δx[k] := max(xm)*δx[k]
δx = [19842934; 19842934; 19842934; 19842934; 19842934; 19842934; 19842934]
Δx = [1.28283e15; 1.28283e15; 1.28283e15; 1.28283e15; 1.28283e15; 1.28283e15; 1.28283e15]
macheps := 2^-49
macheps = 1.77636e-15
macheps^-0.5 = 23726566
macheps^-1 = 562949953421312
# Задание 3
A := [611, 196, -192, 407; 196, 899, 113, -192; -192, 113, 899, 196; 407, -192, 196, 611]
b := [4; -7; 1; 9]
x := lsolve(A, b)
x = [-0.035746; 0.0127246; -0.018704; 0.0485397]
|x|/|b| = 0.00531052
normi(A) = 1406
condi(A) = 168.433
