# Задание 1
ORIGIN := 1
m := 4
A := [0, 2, -1, -10; 8, -1, 1, 0; 4, 18, 0, -3; 4, 0, -30, 3]
b := [-25; -36; -44; -104]
lsolve(A, b) = [-5; -1; 3; 2]
k := 1
A := [8, -1, 1, -10; 0, 2, -1, -10; 4, 18, 0, -3; 4, 0, -30, 3]
b := [-36; -25; -44; -104]
i := k + 1 .. m
μ[i, k] := A[i, k]/A[k, k]
μ = [0; 0; 0.5; 0.5]
b[i] := b[i] - μ[i, k]*b[k]
j := k .. m
A[i, j] := A[i, j] - μ[i, k]*A[k, j]
A = [8, -1, 1, -10; 0, 2, -1, -10; 0, 18.5, -0.5, 2; 0, 0.5, -30.5, 8]
b = [-36; -25; -26; -86]
k := 2
i := k + 1 .. m
μ[i, k] := A[i, k]/A[k, k]
μ = [0, 0; 0, 0; 0.5, 9.25; 0.5, 0.25]
b[i] := b[i] - μ[i, k]*b[k]
j := k .. m
A[i, j] := A[i, j] - μ[i, k]*A[k, j]
A = [8, -1, 1, -10; 0, 2, -1, -10; 0, 0, 8.75, 94.5; 0, 0, -30.25, 10.5]
b = [-36; -25; 205.25; -79.75]
k := 3
A := [8, -1, 1, -10; 0, 2, -1, -10; 0, 0, -30.25, 10.5; 0, 0, 8.75, 94.5]
b := [-36; -25; -79.75; 202.25]
i := k + 1 .. m
μ[i, k] := A[i, k]/A[k, k]
μ = [0, 0, 0; 0, 0, 0; 0.5, 9.25, 0; 0.5, 0.25, -0.289256]
b[i] := b[i] - μ[i, k]*b[k]
j := k .. m
A[i, j] := A[i, j] - μ[i, k]*A[k, j]
A = [8, -1, 1, -10; 0, 2, -1, -10; 0, 0, -30.25, 10.5; 0, 0, 0, 97.5372]
b = [-36; -25; -79.75; 179.182]
X[m] := b[m]/A[m, m]
k := m - 1 .. 1
X[k] := 1/A[k, k]*(b[k] - sum(A[k, j]*X[j], j = k + 1 .. m))
X = [-2.82264; -1.67768; 3.27402; 1.83706]
lsolve(A, b) = [-2.82264; -1.67768; 3.27402; 1.83706]
# Задание 2
ORIGIN := 1
A := [8, -1, 1, -10; 0, 2, -1, -10; 4, 18, 0, -3; 4, 0, -30, 3]
# Заготовим  матрицы L и U:
L := A - A
i := 1 .. 4
L[i, i] := 1
U := A
U = [8, -1, 1, -10; 0, 2, -1, -10; 4, 18, 0, -3; 4, 0, -30, 3]
L = [1, 0, 0, 0; 0, 1, 0, 0; 0, 0, 1, 0; 0, 0, 0, 1]
# 1-й шаг. Вычислим масштабирующие множители 1-го шага
k := 1
i := k + 1 .. 4
j := 1
L[i, j] := U[i, j]/U[k, k]
L = [1, 0, 0, 0; 0, 1, 0, 0; 0.5, 0, 1, 0; 0.5, 0, 0, 1]
# и выполним преобразование матрицы:
i := k + 1 .. 4
j := 1 .. 4
U[i, j] := U[i, j] - U[k, j]*L[i, k]
U = [8, -1, 1, -10; 0, 2, -1, -10; 0, 18.5, -0.5, 2; 0, 0.5, -30.5, 8]
# 2-ой шаг. Вычислим масштабирующие множители 2-го шага
k := 2
i := k + 1 .. 4
j := 2
# и выполним преобразование матрицы:
L[i, j] := U[i, j]/U[k, k]
L = [1, 0, 0, 0; 0, 1, 0, 0; 0.5, 9.25, 1, 0; 0.5, 0.25, 0, 1]
i := k + 1 .. 4
j := 2 .. 4
U[i, j] := U[i, j] - U[k, j]*L[i, k]
U = [8, -1, 1, -10; 0, 2, -1, -10; 0, 0, 8.75, 94.5; 0, 0, -30.25, 10.5]
# 2-ой шаг не изменяет матрицы  U.
#
# 3-й шаг. Вычислим масштабирующие множители 3-го шага:
k := 3
i := k + 1 .. 4
j := 3
L[i, j] := U[i, j]/U[k, k]
L = [1, 0, 0, 0; 0, 1, 0, 0; 0.5, 9.25, 1, 0; 0.5, 0.25, -3.45714, 1]
# Выполним преобразование матрицы  U и получим ее окончательный вид:
i := k + 1 .. 4
j := 3 .. 4
U[i, j] := U[i, j] - U[k, j]*L[i, k]
U = [8, -1, 1, -10; 0, 2, -1, -10; 0, 0, 8.75, 94.5; 0, 0, 0, 337.2]
# Проверка LU-разложения
L*U == A = 1
L*U = [8, -1, 1, -10; 0, 2, -1, -10; 4, 18, 0, -3; 4, 0, -30, 3]
A = [8, -1, 1, -10; 0, 2, -1, -10; 4, 18, 0, -3; 4, 0, -30, 3]
L = [1, 0, 0, 0; 0, 1, 0, 0; 0.5, 9.25, 1, 0; 0.5, 0.25, -3.45714, 1]
b := [-36; -25; -44; -104]
lsolve(A, b) = [-2.76563; -1.51856; 3.2847; 1.86782]
y[1] := b[1]
y[2] := b[2] - L[2, 1]*y[1]
y[3] := b[3] - L[3, 1]*y[1] - L[3, 2]*y[2]
y[4] := b[4] - L[4, 1]*y[1] - L[4, 2]*y[2] - L[4, 3]*y[3]
y = [-36; -25; 205.25; 629.829]
x[4] := y[4]/U[4, 4]
x[3] := (y[3] - U[3, 4]*x[4])/U[3, 3]
x[2] := (y[2] - U[2, 4]*x[4] - U[2, 3]*x[3])/U[2, 2]
x[1] := (y[1] - U[1, 4]*x[4] - U[1, 3]*x[3] - U[1, 2]*x[2])/U[1, 1]
transpose(x) = [-2.76563, -1.51856, 3.2847, 1.86782]
# Решение с помощью ранжированных переменных:
y := 0
x := 0
y = 0
x = 0
m := 4
y[1] := b[1]
i := 2 .. m
y[i] := b[i] - sum(L[i, j]*y[j], j = 1 .. i - 1)
transpose(y) = [-36, -25, 205.25, 629.829]
x[m] := y[m]/U[m, m]
i := 3 .. 1
x[i] := (y[i] - sum(U[i, j]*x[j], j = 4 .. i + 1))/U[i, i]
transpose(x) = [-2.76563, -1.51856, 3.2847, 1.86782]
# Проверка:
y := 0
x := 0
y = 0
x = 0
y := L^-1*b
x := U^-1*y
transpose(y) = [-36, -25, 205.25, 629.829]
transpose(x) = [-2.76563, -1.51856, 3.2847, 1.86782]
