ORIGIN := 1
A := [7.92, 3.36, -2.24, 1.98; -13.86, 18.20, 0, 3.96; -2.97, 0.20, 4.80, 0; 5.94, 0, -10.60, 16.83]
b := [-1.956; 62.8; -4.16; 48.31]
x := lsolve(A, b)
x = [-2.02228; 1.42905; -2.1775; 2.21277]  # - решение системы Ax=b, полученное с помощью встроенной функции lsolve
# Преобразование системы Ax=b к виду x=Bx+c, удобному для итераций
PB(A, n) :=
    for i ∈ 1 .. n
        for j ∈ 1 .. n
            B[i, j] ← 0 if i == j
            B[i, j] ← -A[i, j]/A[i, i] if i ≠ j
    B
Pc(A, b, n) :=
    for i ∈ 1 .. n
        c[i] ← b[i]/A[i, i]
    c
B := PB(A, 4)
B = [
    0, -0.424242, 0.282828, -0.25;
    0.761538, 0, 0, -0.217582;
    0.61875, -0.0416667, 0, 0;
    -0.352941, 0, 0.629828, 0
]
c := Pc(A, b, 4)
c = [-0.24697; 3.45055; -0.866667; 2.87047]
# Проверка достаточного условия сходимости метода Зейделя
normi(B) = 0.982769  # - достаточное условие сходимости выполнено
# Метод Зейделя
zeid(B, c, n, k, x0) :=
    y ← x0
    for m ∈ 1 .. k
        x ← y
        for i ∈ 1 .. n
            u ← 0
            j ← 1
            while 1 ≤ j < i
                u ← u + B[i, j]*y[j]
                j ← j + 1
            j ← i + 1
            while i < j ≤ n
                u ← u + B[i, j]*x[j]
                j ← j + 1
            y[i] ← u + c[i]
        for i ∈ 1 .. n
            rez[i, m] ← y[i]
    rez
# входные параметры:
# B и c - матрица B и вектор правой части c
# системы x=Bx+c;
# n -  порядок матрицы B;
# k-  число итераций;
# x0 -  вектор начального приближения.
# Функция zeid возвращает двумерный
# массив размерности kxn; i-ая строка
# которого это i-ое приближение.
# Начальное приближение:
x0 := [0; -1; 1.2; 2]
# Результат работы функции zeid - значения первых 10 приближений:
y := zeid(B, c, 4, 10, x0)
y = [
    0.0166667, -2.37094, -1.96298, -2.03237, -2.02056, -2.02257, -2.02223, -2.02229, -2.02228, -2.02228;
    3.02808, 1.15635, 1.47544, 1.42115, 1.43039, 1.42882, 1.42908, 1.42904, 1.42905, 1.42905;
    -0.982524, -2.38186, -2.14274, -2.18341, -2.17649, -2.17767, -2.17747, -2.1775, -2.1775, -2.1775;
    2.24577, 2.20711, 2.21373, 2.2126, 2.2128, 2.21276, 2.21277, 2.21277, 2.21277, 2.21277
]
lsolve(A, b) = [-2.02228; 1.42905; -2.1775; 2.21277]
# Абсолютная погрешность:
i := 1 .. 4
d[i] := |y[i, 10] - x[i]|
max(d) = 2.44975e-7
