# Задача 1
x := 0, 0 + 0.1 .. 3
f(x) := cos(x)^2 + cos(x)/2 + 1/18
g(x) := cos(x)^2 + cos(x)/3 + 1/36
# Метод бисекции
bisec(f, a, b, ε) :=
    an ← a
    bn ← b
    k ← 0
    while (bn - an) > 2*ε
        xn ← (an + bn)/2
        fa ← f(an)
        fb ← f(bn)
        fxn ← f(xn)
        bn ← xn if fa*fxn ≤ 0
        an ← xn otherwise
        k ← k + 1
    xn ← (an + bn)/2
    res ← [xn; k]
    res
# КОРЕНЬ:
bisec(f, 0, 2, 10^-10) = [1.73824; 34]
bisec(g, 0, 2, 10^-10) = [2; 34]
# Задача 4
f(x) := x^5 + 4.545004*x^4 + (-3.055105)*x^3 + (-18.06895)*x^2 + 4.002429*x + 4.722482
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# Метод Ньютона
mN_step(f, x) := x - f(x)/d/dx(f(x))
mN(f, x0, ε) :=
    xold ← x0
    xnew[0] ← x0
    k ← 1
    xnew[k] ← mN_step(f, xold)
    while |xnew - xold| > ε
        xold ← xnew[k]
        k ← k + 1
        xnew[k] ← mN_step(f, xold)
        break if k > 6
    res ← transpose(xnew)
    res
# Зададим точность
ε := 10^-8
# Зададим начальное приближение
x0 := 1.88
mN(f, x0, ε) = [1.88, 1.784, 1.7666, 1.76606, 1.76606, 1.76606, 1.76606, 1.76606]
# Зададим начальное приближение
x0 := 1.89
mN(f, x0, ε) = [1.89, 1.7869, 1.76679, 1.76606, 1.76606, 1.76606, 1.76606, 1.76606]
# Зададим начальное приближение
x0 := 1.87
mN(f, x0, ε) = [1.87, 1.78127, 1.76645, 1.76606, 1.76606, 1.76606, 1.76606, 1.76606]
# Задача 5
f(x) := x^2 - 3*x + 3.25 - 5*cos(x)
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# Будем искать простой  корень уравнения , находящийся на отрезке локализации  [-0.4,0]
f(-0.4) = 0.00469503
f(0) = -1.75
# Найдем корень с помощью встроенной функции root:
x0 := 0
TOL := 10^-10
root(f(x0), x0) = -0.399183
# 1 СПОСОБ. ПРИВЕДЕМ УРАВНЕНИЕ К ВИДУ x=φ(x) , где
ϕ(x) := (x^2 - 5*cos(x) + 3.25)/3
d/dx(ϕ(x)) → [
    0;
    0.233055694411;
    0.464448884658;
    0.692533677769;
    0.915697237181;
    1.13237589767;
    1.34107078899;
    1.54036281206;
    1.72892681817;
    1.90554484938;
    5*sin(1)/3 + 2/3;
    2.21867893344;
    2.35339847661;
    2.4725969757;
    2.57574954998;
    2.66249164434;
    2.73262267174;
    2.78610801742;
    2.8230793848;
    2.84383347948;
    5*sin(2)/3 + 4/3;
    2.83868227775;
    2.81416067303;
    2.77617535363;
    2.72577196759;
    2.66412024017;
    2.59250228637;
    2.51229980039;
    2.42498025026;
    2.33208221536;
    5*sin(3)/3 + 2
]
# График производной
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# Макимальное по модулю значение производной итерационной функции достигается в левом конце отрезка
ϕ1(x) := d/dx(ϕ(x))
q := |ϕ1(-0.4)|
q = 0.915697
x0 := -0.4
# Выполним 3 итерации по расчетной формуле | x=φ(x)
# 1 итерация
x0 := -0.4
y := ϕ(x0)
y = -0.398435
# 2 итерация
x1 := -0.39843499
y := ϕ(x1)
y = -0.399865
# 3 итерация
x2 := -0.3998653686
y := ϕ(y)
y = -0.398558
# Погрешность найденного значения:
|y - (-0.3991826759)| = 0.000624424
# Задание 6
# Приближенное решение системы
# нелинейных уравнений  0.4x1^2+0.9x2^2=1,
# 1.5cos(x1-1)+x2=1.
# Уравнения системы:
f1(x1, x2) := x2 + 1.5*cos(x1 - 1) - 1
f2(x1, x2) := 0.9*x2^2 + 0.4*x1^2 - 1
# Локализация  корней
# Первое уравнение системы,
# разрешенное относительно x2:
g1(x1) := 1 - 1.5*cos(x1 - 1)
# Второе уравнение системы,
# разрешенное относительно x2
g2(x1) := sqrt((1 - 0.4*x1^2)/0.9)
x1 := -2, -2 + 0.01 .. 2
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# Первый корень:
# Начальное приближение
x1 := 1.7
x2 := -0.5
# Точность для блока Given Find
TOL := 10^-6
# Решение системы f(x1,x2)=0 с помощью встроенного блока MATHCAD
Given
f1(x1, x2) == 0
f2(x1, x2) == 0
xr1 := Find(x1, x2)
# Полученное приближенное решение
xr1 = [1.51245; -0.307321]
# Второй корень:
# Начальное приближение
x1 := -1.5
x2 := 1
# Решение системы f(x1,x2)=0 с помощью встроенного блока MATHCAD
Given
f1(x1, x2) == 0
f2(x1, x2) == 0
xr2 := Find(x1, x2)
# Полученное приближенное решение
xr2 = [-0.561118; 0.985483]
x1 := -2, -2 + 0.01 .. 2
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ORIGIN := 1
f1(x1, x2) := 1.5*cos(x1 - 1) + x2 - 1
f2(x1, x2) := 0.4*x1^2 + 0.9*x2^2 - 1
J(x1, x2) := [d/dx1(f1(x1, x2)), d/dx2(f1(x1, x2)); d/dx1(f2(x1, x2)), d/dx2(f2(x1, x2))]
mNs(x1, x2, ε) :=
    x ← [x1; x2]
    xn ← x - J(x1, x2)^-1*[f1(x1, x2); f2(x1, x2)]
    k ← 1
    while |xn - x| > ε
        k ← k + 1
        x ← xn
        xn ← x - J(x[1], x[2])^-1*[f1(x[1], x[2]); f2(x[1], x[2])]
    res ← [xn[1]; xn[2]; k]
    res
mNs(1.7, -0.5, 10^-6) = [1.51245; -0.307321; 5]
mNs(-1.5, 1, 10^-6) = [-0.561118; 0.985483; 5]
