# Задача  1
f(x) := tan(x + sqrt(x))
# Проинтерполируем функцию на отрезке [a,b] многочленами  Лагранжа степени  1, 2, 3
a := 0
b := 0.4
h(n) := (b - a)/n  # вычисление  шага при заданном значении n
s(n) :=
    for i ∈ 0 .. n
        x[i] ← a + i*h(n)
    x  # вычисление  массива узлов
r(n) :=
    for i ∈ 0 .. n
        y[i] ← f(s(n)[i])
    y  # вычисление  значений функции в узлах
x1 := s(1)
x1 = [0; 0.4]
y1 := r(1)
y1 = [0; 1.67455]
L1(t) := y1[0]*(t - x1[1])/(x1[0] - x1[1]) + y1[1]*(t - x1[0])/(x1[1] - x1[0])
x2 := s(2)
x2 = [0; 0.2; 0.4]
y2 := r(2)
y2 = [0; 0.755817; 1.67455]
L2(t) := y2[0]*(t - x2[1])*(t - x2[2])/((x2[0] - x2[1])*(x2[0] - x2[2])) + y2[1]*(t - x2[0])*(t - x2[2])/((x2[1] - x2[0])*(x2[1] - x2[2])) + y2[2]*(t - x2[0])*(t - x2[1])/((x2[2] - x2[0])*(x2[2] - x2[1]))
x3 := s(3)
y3 := r(3)
y3 = [0; 0.544333; 0.995343; 1.67455]
x3 = [0; 0.133333; 0.266667; 0.4]
L3(t) := y3[0]*(t - x3[1])*(t - x3[2])*(t - x3[3])/((x3[0] - x3[1])*(x3[0] - x3[2])*(x3[0] - x3[3])) + y3[1]*(t - x3[0])*(t - x3[2])*(t - x3[3])/((x3[1] - x3[0])*(x3[1] - x3[2])*(x3[1] - x3[3])) + y3[2]*(t - x3[1])*(t - x3[0])*(t - x3[3])/((x3[2] - x3[1])*(x3[2] - x3[0])*(x3[2] - x3[3])) + y3[3]*(t - x3[1])*(t - x3[2])*(t - x3[0])/((x3[3] - x3[1])*(x3[3] - x3[2])*(x3[3] - x3[0]))
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sin(5) = -0.958924
tan(5) = -3.38052
cos(5) = 0.283662
sin(5)/cos(5) = -3.38052
(e^5 - e^-5)/2 = 74.2032
sinh(5) = 74.2032
asin(5) = 1.5708 - 2.29243i
# Задача 2
f(x) := (x + 1)*|x^2 - 2|  # - функция
a := 0
b := 2
h(n) := (b - a)/n  # вычисление  шага при заданном значении n
s(n) :=
    for i ∈ 0 .. n
        s[i] ← a + i*h(n)
    s  # вычисление  массива узлов
r(n) :=
    for i ∈ 0 .. n
        y[i] ← f(s(n)[i])
    y  # вычисление  значений функции в узлах
# Зададим значения 41 точки на отрезке [a,b]
k := 0 .. 40
# Вычислим  t(k)=t(0)+hk
h(40) = 0.05
t[k] := a + h(40)*k
fit(x, y, t) := linterp(x, y, t)
# для заданных векторов х и у и заданного аргумента t встроенная функция lineterp возвращает значение функции
# при кусочно-линейной интерполяции в точке t.
# Зададим значение n=5
n := 5
x := s(n)
y := r(n)
q[k] := fit(x, y, t[k])
p[k] := f(t[k])
rlin[k] := |p[k] - q[k]|
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n := 12
x := s(n)
y := r(n)
q[k] := fit(x, y, t[k])
p[k] := f(t[k])
rlin[k] := |p[k] - q[k]|
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n := 5
x := s(n)
y := r(n)
transpose(x) = [0, 0.4, 0.8, 1.2, 1.6, 2]
transpose(y) = [2, 2.576, 2.448, 1.232, 1.456, 6]
# Функция inter возвращает значение интерполяционного многочлена в форме Ньютона (с разделенными разностями) в точке t:
inter(x, y, n, t) :=
    for i ∈ 0 .. n
        f[i, 0] ← y[i]
    for k ∈ 1 .. n
        for i ∈ 0 .. n - k
            f[i, k] ← (f[i + 1, k - 1] - f[i, k - 1])/(x[i + k] - x[i])
    s ← y[0]
    for k ∈ 1 .. n
        r ← 1
        for i ∈ 0 .. k - 1
            r ← r*(t - x[i])
        s ← f[0, k]*r + s
    s
# Входные параметры:
# x, y - векторы исходных данных;
# n+1 - размерность x,y.
# Вычисление значений интерполяционного многочлена в точках t_k :
k := 0 .. 40
t[k] := x[0] + (x[n] - x[0])*k/40
q[k] := inter(x, y, n, t[k])
# График интерполяционного многочленa  и точечный график исходной функции:
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