# Задача 1
# Векторы исходных данных:
x := [0; 0.2; 0.4; 0.6; 0.8; 1; 1.2; 1.4; 1.6; 1.8; 2]
y := [-0.9; -0.6482; -0.2436; -0.1; 0.0231; 0.0260; 0.0967; -0.2203; -0.3230; -0.6472; -0.7630]
n := last(x)
n = 10
# а)  Функция mnk, строящая многочлен степени m по методу наименьших квадратов,
# возвращает вектор a коэффициентов многочлена:
mnk(x, y, n, m) :=
    for j ∈ 0 .. m
        b[j] ← sum(y[i]*x[i]^j, i = 0 .. n)
        for k ∈ 0 .. m
            Γ[j, k] ← sum(x[i]^(k + j), i = 0 .. n)
    a ← lsolve(Γ, b)
    a
# формирование вектора правой части и
# матрицы нормальной системы
# Га=b метода наименьших квадратов
# (базисные функции - 1,x, , x^2... ,x^m)
# - встроенная функция MATHCAD,
# решает систему линейных алгебраических уравнений Γa=b
# Входные параметры:
# x, y - векторы исходных данных;
# n+1 - размерность x,y.
# Вычисление коэффициентов многочленов степени 0,1,2,3 по методу наименьших квадратов:
a0 := mnk(x, y, n, 0)
a1 := mnk(x, y, n, 1)
a0 = [-0.336318]
a1 = [-0.349218; 0.0129]
a2 := mnk(x, y, n, 2)
a3 := mnk(x, y, n, 3)
a4 := mnk(x, y, n, 4)
a5 := mnk(x, y, n, 5)
a2 = [-0.901092; 1.85248; -0.91979]
a3 = [-0.95415; 2.274; -1.47248; 0.184229]
a4 = [-0.909056; 1.49111; 0.484744; -1.38155; 0.391444]
a5 = [-0.914779; 1.71542; -0.439294; -0.0799461; -0.353748; 0.149038]
# Функция P возвращает значение многочлена степени m в
# точке t;многочлен задается с помощью вектора
# коэффициентов a:
P(a, m, t) := sum(a[j]*t^j, j = 0 .. m)
# Функция σ0 возвращает значение среднеквадратичного отклонения многочлена P(a,m,t) :
σ0(a, m) := sqrt(1/(n - m)*sum((P(a, m, x[k]) - y[k])^2, k = 0 .. n))
# Вычисление значений σ_m ,m=0,1,2,3,4,5:
σ[0] := σ0(a0, 0)
σ[1] := σ0(a1, 1)
σ[2] := σ0(a2, 2)
σ[3] := σ0(a3, 3)
σ[4] := σ0(a4, 4)
σ[5] := σ0(a5, 5)
σ[0] = 0.34925
σ[1] = 0.368031
σ[2] = 0.0848626
σ[3] = 0.0794574
σ[4] = 0.0683609
σ[5] = 0.0741236
# Графики многочленов степени 0,1,2,3 и точечный график исходной функции:
t := x[0], x[0] + 0.05 .. x[n]
i := 0 .. n
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# б) Встроенные средства
# Линейная регрессия:
line(x, y) = [-0.349218; 0.0129]
transpose(a1) = [-0.349218, 0.0129]
# Полиномиальная регрессия:
k := 4
vs := regress(x, y, k)
transpose(vs) = [3, 3, 4, -0.909056, 1.49111, 0.484744, -1.38155, 0.391444]
f(z) := interp(vs, x, y, z)
coeff := submatrix(vs, 3, length(vs) - 1, 0, 0)
transpose(coeff) = [-0.909056, 1.49111, 0.484744, -1.38155, 0.391444]
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transpose(a4) = [-0.909056, 1.49111, 0.484744, -1.38155, 0.391444]
