# Задание 1
# Многочлен:
P(x, c) := c[0] + c[1]*x + c[2]*x^2 + c[3]*x^3 + c[4]*x^4
# Коэффициенты многочлена:
c[0] := -2.5
c[1] := -2.1
c[2] := 0
c[3] := 0.4
c[4] := 0.5
# Концы отрезка интегрирования:
a := 1
b := 1.44
x := a, a + 0.01 .. b
integral(c[0] + c[1]*x + c[2]*x^2 + c[3]*x^3, x = a .. b) → -1.897298304
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# Значение интеграла, вычисленное аналитически:
I := 1.897298
# Элементарная формула левых прямоугольников:
S := P(a, c)*(b - a)
S = -1.628
# Абсолютная погрешность:
r := |S - I|
r = 3.5253
# Определение максимума модуля производной M1 многочлена  на отрезке [a,b]:
P1(x, c) := d/dx(P(x, c))
x := a, a + 0.1 .. b
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M1 := |P1(b, c)|
M1 = 6.36029
# Теоретическая оценка погрешности:
R := M1*(b - a)^2/2
R = 0.615676
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# Составная формула левых прямоугольников:
# Оценка требуемого шага интегрирования:
h := 2*0.0001/(M1*0.44)
h = 7.14662e-5
# Вычисление по составной формуле левых прямоугольников с найденным шагом h:
# Количество отрезков интегрирования:
n := ceil((b - a)/h)
n = 6157
# Скорректированный шаг интегрирования:
h := (b - a)/n
h = 7.14634e-5
# Приближенное значение интеграла:
S := h*sum(P(a + i*h, c), i = 0 .. n - 1)
S = -1.37818
# Абсолютная погрешность:
r := |S - I|
r = 3.27548
