# ИСХОДНЫЕ ДАННЫЕ
# Правая часть уравнения:
f(t, y) := (y/(t + 1)) + e^t*(t + 1)
# Начальное значение:
y[0] := 1
# Отрезок:
t0 := 0
T := 1
# Шаг сетки:
h := 0.1
# Число узлов сетки:
N := (T - t0)/h
N = 10
# Функция, реализующая явный метод Эйлера; возвращает вектор решения:
eyler(f, y0, t0, h, N) :=
    y[0] ← y0
    for i ∈ 0 .. N - 1
        y[i + 1] ← y[i] + h*f(t0 + i*h, y[i])
    y
# Входные параметры:
# f - функция правой части;
# y0 - начальное значение;
# t0 - начальная точка отрезка;
# h - шаг сетки;
# N - число узлов сетки.
# ВЫЧИСЛЕНИЕ РЕШЕНИЯ ПО МЕТОДУ ЭЙЛЕРА:
yE := eyler(f, y[0], t0, h, N)
# ВЫЧИСЛЕНИЕ РЕШЕНИЯ ПО МЕТОДУ РУНГЕ-КУТТЫ (4 порядка точности):
yRK4 := rkfixed(y, t0, T, N, f)
# - встроенная функция;
# входные параметры:
# y - вектор начальных значений;
# t0- начальная точка отрезка;
# T - конечная точка отрезка;
# N - число узлов сетки;
# f - функция правой части.
# Функция rkfixed возвращает матрицу, первый столбец которой содержит узлы сетки, а второй - приближенное решение в этих узлах.
# Получение точного решения с помощью блока Givin и функции odesolve:
Given
Y'(t) - 2*Y(t)*t == 0
Y(0) == 1
Y := Odesolve(t, T)
# Точное решение в узлах сетки:
i := 0 .. N
t[i] := t0 + i*h
yt[i] := Y(t[i])
# Решение по методу
# Эйлера
# Решение по методу
# Рунге-Кутты 4 порядка
# Точное решение
yE = [1; 1.2; 1.43066; 1.69645; 2.00243; 2.35431; 2.75858; 3.22253; 3.75442; 4.3636; 5.06059]
yRK4 = [
    0, 1;
    0.1, 1.21569;
    0.2, 1.46568;
    0.3, 1.75482;
    0.4, 2.08855;
    0.5, 2.47308;
    0.6, 2.91539;
    0.7, 3.42338;
    0.8, 4.00597;
    0.9, 4.67324;
    1, 5.43656
]
yt = [1; 1.01007; 1.04085; 1.09423; 1.17358; 1.2841; 1.43341; 1.63242; 1.89661; 2.24808; 2.7185]
# Графики приближенных и точного решений
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# ВЫЧИСЛЕНИЕ  ПОГРЕШНОСТИ ПО ПРАВИЛУ РУНГЕ:
# Вычисление приближенных решений с шагом h/2:
h2 := h/2
N2 := (T - t0)/h2
N2 = 20
yEh2 := eyler(f, y[0], t0, h2, N2)
yRK4h2 := rkfixed(y, t0, T, N2, f)
# Вычисление погрешностей:
i := 0 .. N
zE[i] := |yE[i] - yEh2[2*i]|
zRK4[i] := |yRK4[:, 1][i] - yRK4h2[:, 1][2*i]|/15
# Значение погрешностей:
max(zE) = 0.182859  # '
max(zRK4) = 1.75594e-7
