# Задание 2
# Построить график функции f(x) в соответствие с вариантом задания и приблизительно
# определить один из корней уравнения. Решить уравнение f(x)=0 с точностью e=10–4
# с помощью встроенной функции Mathcad «root».
f(x) := x^5 - x - 0.2
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x
x := 10^-4
root(x^5 - x - 0.2, x, -1, -0.5) = -0.942087
root(x^5 - x - 0.2, x, -0.5, 0) = -0.200323
# Задание 3
# Построить кривую, заданную в полярной системе координат, в соответствие с
# вариантом задания.Коэффициенты a и b выбрать самостоятельно. Построить график, используя установки формата по умолчанию, а затем построить второй график, в котором изменить установки для осей координат и свойства графика.
a := 7
ϕ := 0.01 .. 4*π
ρ1(ϕ) := sqrt(a^2/ϕ)
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# Задание 4
# Построить трехмерный график с применением Мастера построения трехмерных
# графиков в соответствие с вариантом задания. Функция двух переменных z = f(x, y)
f(x, y) := x*cos(y) + y*sin(x)
# НЕ СТРОИТСЯ 3Д ГРАФИК
# Задание 6
# Создать анимационный клип движения точки по графику функции f(x) в соответствие с
# вариантом задания
