# Задание 2
# Построить график функции f(x) в соответствие с вариантом задания и приблизительно
# определить один из корней уравнения. Решить уравнение f(x)=0 с точностью e=10–4
# с помощью встроенной функции Mathcad «root».
f(x) := x^5 - x - 0.2
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x := 10^-4
root(x^5 - x - 0.2, x, -1, -0.5) = -0.942087
root(x^5 - x - 0.2, x, -0.5, 0) = -0.200323
# Задание 3
# Построить кривую, заданную в полярной системе координат, в соответствие с
# вариантом задания.Коэффициенты a и b выбрать самостоятельно. Построить график, используя установки формата по умолчанию, а затем построить второй график, в котором изменить установки для осей координат и свойства графика.
a := 7
ϕ := 0.01 .. 4*π
ρ1(ϕ) := sqrt(a^2/ϕ)
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# Задание 4
# Построить трехмерный график с применением Мастера построения трехмерных
# графиков в соответствие с вариантом задания. Функция двух переменных z = f(x, y)
f(x, y) := x*cos(y) + y*sin(x)
# [component: inputs f]
# Задание 5
# Отобразить графически квадратную матрицу А порядка n (n =10), элементы которой aij определяются с помощью функции f(i,j) (т.е. необходимо построить поверхность по матрице аппликат А)
f(i, j) := i*(i - 2) + j*(j - 4)
i := 0 .. 9
j := 0 .. 9
B[i, j] := f(i, j)
B = [
    0, -3, -4, -3, 0, 5, 12, 21, 32, 45;
    -1, -4, -5, -4, -1, 4, 11, 20, 31, 44;
    0, -3, -4, -3, 0, 5, 12, 21, 32, 45;
    3, 0, -1, 0, 3, 8, 15, 24, 35, 48;
    8, 5, 4, 5, 8, 13, 20, 29, 40, 53;
    15, 12, 11, 12, 15, 20, 27, 36, 47, 60;
    24, 21, 20, 21, 24, 29, 36, 45, 56, 69;
    35, 32, 31, 32, 35, 40, 47, 56, 67, 80;
    48, 45, 44, 45, 48, 53, 60, 69, 80, 93;
    63, 60, 59, 60, 63, 68, 75, 84, 95, 108
]
# [component: inputs B]
# [component: inputs B]
# [component: inputs B]
# [component: inputs B]
# [component: inputs B]
# Surface Plot | Countour Plot | 3D Scatter Plot | 3D Bar Plot | Vector Field Plot
# Задание 6
# Создать анимационный клип движения точки по графику функции f(x) в соответствие с вариантом задания
f(z) := z^5 - z - 0.2
g(FRAME) := FRAME^5 - FRAME - 0.2
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