# Пример 2.4
x1 := -1
x2 := 1
y1 := -1
y2 := 1
k := (y2 - y1)/(x2 - x1) = 1
L(x) := k*(x - x1) + y1
x3 := -1
x4 := 1
y3 := 1
y4 := -2
k2 := (y4 - y3)/(x4 - x3) = -1.5
L2(x) := k2*(x - x3) + y3
L(x) == L2(x) solve, x → -0.2
a := -0.2
L(a) = -0.2
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