x1 := -1
y1 := -1
x2 := 1
y2 := 1
x4 := 5
y4 := 0
P1(x, y) := [x1; y1; 0]
P2(x, y) := [x2; y2; 0]
P4(x, y) := [x4; y4; 0]
T1 := CreateMesh(P1, x1, x1, y1, y1)
T2 := CreateMesh(P2, x2, x2, y2, y2)
T4 := CreateMesh(P4, x4, x4, y4, y4)
p1 := [x1; y1; 0]
p2 := [x2; y2; 0]
p4 := [x4; y4; 0]
n1 := (p2 - p1)/|p2 - p1|
ln1(t) := p1 + t*n1
(ln1(t) - p4)*n1 == 0 solve, t → 7*sqrt(2)/2
p6 := ln1(7*sqrt(2)/2) = [2.5; 2.5; 0]
P6(x, y) := [2.5; 2.5; 0]
T6 := CreateMesh(P6, 1, 1, 0, 0)
G(u, v) := p4 + u*(p4 - p6)
perpend := CreateMesh(G, -5, 5, 10, 50)
lnn1(u, v) := p1 + u*n1
lin1 := CreateMesh(lnn1, -10, 10, 10, 50)
# [component: inputs T1, T2, T4, T6, lin1, perpend]
