# Задание 2
x1 := 9
y1 := 16
x2 := 7
y2 := 15
x3 := 4
y3 := 15
x4 := 15
y4 := 10
x5 := 11
y5 := 3
P1(x, y) := [x1; y1; 0]
P2(x, y) := [x2; y2; 0]
P3(x, y) := [x3; y3; 0]
P4(x, y) := [x4; y4; 0]
P5(x, y) := [x5; y5; 0]
T1 := CreateMesh(P1, x1, x1, y1, y1)
T2 := CreateMesh(P2, x2, x2, y2, y2)
T3 := CreateMesh(P3, x3, x3, y3, y3)
T4 := CreateMesh(P4, x4, x4, y4, y4)
T5 := CreateMesh(P5, x5, x5, y5, y5)
p1 := [x1; y1; 0]
p2 := [x2; y2; 0]
p3 := [x3; y3; 0]
p4 := [x4; y4; 0]
p5 := [x5; y5; 0]
nl1 := (p2 - p1)/|p2 - p1|
ln1(t) := p1 + t*nl1
lnn1(u, v) := p1 + u*nl1
k1 := sqrt((x2 - x1)^2 + (y2 - y1)^2) = 2.23607
lin1 := CreateMesh(lnn1, 0, k1, 0, 0)
nl2 := (p3 - p2)/|p3 - p2|
ln2(t) := p2 + t*nl2
lnn2(u, v) := p2 + u*nl2
k2 := sqrt((x3 - x2)^2 + (y3 - y2)^2) = 3
lin2 := CreateMesh(lnn2, 0, k2, 0, 0)
nl3 := (p5 - p3)/|p5 - p3|
ln3(t) := p3 + t*nl3
lnn3(u, v) := p3 + u*nl3
k3 := sqrt((x5 - x3)^2 + (y5 - y3)^2) = 13.8924
lin3 := CreateMesh(lnn3, 0, k3, 0, 0)
nl4 := (p4 - p5)/|p4 - p5|
ln4(t) := p5 + t*nl4
lnn4(u, v) := p5 + u*nl4
k4 := sqrt((x5 - x4)^2 + (y5 - y4)^2) = 8.06226
lin4 := CreateMesh(lnn4, 0, k4, 0, 0)
nl5 := (p1 - p4)/|p1 - p4|
ln5(t) := p4 + t*nl5
lnn5(u, v) := p4 + u*nl5
k5 := sqrt((x1 - x4)^2 + (y1 - y4)^2) = 8.48528
lin5 := CreateMesh(lnn5, 0, k5, 0, 0)
# [component: inputs T1, T2, T3, T4, T5, lin1, lin2, lin3, lin4, lin5]
# Задание 3
x6 := (x4 + x1)/2 = 12
y6 := (y4 + y1)/2 = 13
x7 := (x3 + x5)/2 = 7.5
y7 := (y3 + y5)/2 = 9
x8 := (x4 + x5)/2 = 13
y8 := (y4 + y5)/2 = 6.5
P6(x, y) := [x6; y6; 0]
P7(x, y) := [x7; y7; 0]
P8(x, y) := [x8; y8; 0]
p6 := [x6; y6; 0]
p7 := [x7; y7; 0]
p8 := [x8; y8; 0]
T6 := CreateMesh(P6, x6, x6, y6, y6)
T7 := CreateMesh(P7, x7, x7, y7, y7)
T8 := CreateMesh(P8, x8, x8, y8, y8)
nl6 := (p7 - p6)/|p7 - p6|
ln6(t) := p6 + t*nl1
lnn6(u, v) := p6 + u*nl6
k6 := sqrt((x6 - x7)^2 + (y6 - y7)^2) = 6.0208
lin6 := CreateMesh(lnn6, 0, k6, 0, 0)
nl7 := (p8 - p7)/|p8 - p7|
ln7(t) := p7 + t*nl7
lnn7(u, v) := p7 + u*nl7
k7 := sqrt((x8 - x7)^2 + (y8 - y7)^2) = 6.04152
lin7 := CreateMesh(lnn7, 0, k7, 0, 0)
nl8 := (p6 - p8)/|p6 - p8|
ln8(t) := p8 + t*nl8
lnn8(u, v) := p8 + u*nl8
k8 := sqrt((x6 - x8)^2 + (y6 - y8)^2) = 6.57647
lin8 := CreateMesh(lnn8, 0, k8, 0, 0)
# [component: inputs [(T1, T2, T3, T4, T5, lin1, lin2, lin3, lin4, lin5, T6, T7, T8, lin6, lin7, lin8), □, □, □, □, □, □, □, □, □, □, □, □, □, □, □]]
# Задание 7
nl9 := (p4 - p3)/|p4 - p3|
ln9(t) := p3 + t*nl9
(ln9(t) - p1)*nl9 solve → 25*sqrt(146)/73
p9 := ln9(25*sqrt(146)/73) = [7.76712; 13.2877; 0]
P9(x, y) := [7.767; 13.288; 0]
T9 := CreateMesh(P9, 1, 1, 0, 0)
nl10 := (p3 - p4)/|p3 - p4|
ln10(t) := p4 + t*nl10
lnn10(u, v) := p4 + u*nl10
k10 := sqrt((x3 - x4)^2 + (y3 - y4)^2) = 12.083
lin10 := CreateMesh(lnn10, 0, k10, 0, 0)
G(u, v) := p1 + u*(p1 - p9)
perpend := CreateMesh(G, -1, 0, 0, 0)
# [component: inputs [(T1, T2, T3, T4, T5, lin1, lin2, lin3, lin4, lin5, T9, lin10, perpend), □, □, □, □, □, □, □, □, □, □, □, □]]
# Задание 8
lnn11(u, v) := P1(u, v) + [(x4 - x3)*u; (y4 - y3)*u; 0]
lin11 := CreateMesh(lnn11, -1, 1, 0, 0)
# [component: inputs [(T1, lin1, lin2, lin3, lin4, lin5, lin10, lin11), □, □, □, □, □, □, □]]
# Задание 9
k12 := (y2 - y3)/(x2 - x3) = 0
L12(x) := k12*(x - x3) + y3
k13 := (y4 - y5)/(x4 - x5) = 1.75
L13(x) := k13*(x - x5) + y5
L12(x) == L13(x) solve → 17.8571428571
tmp := 17.857142
L12(tmp) = 15
p12 := [tmp; 15; 0]
P12(x, y) := [tmp; 15; 0]
nl12 := (p12 - p2)/|p12 - p2|
ln12(t) := p2 + t*nl12
lnn12(u, v) := p2 + u*nl12
lin12 := CreateMesh(lnn12, 0, 15, 0, 0)
nl13 := (p12 - p4)/|p12 - p4|
ln13(t) := p4 + t*nl13
lnn13(u, v) := p4 + u*nl13
lin13 := CreateMesh(lnn13, 0, 10, 0, 0)
# [component: inputs [(T2, T3, T4, T5, lin1, lin2, lin3, lin4, lin5, P12, lin12, lin13), □, □, □, □, □, □, □, □, □, □, □]]
V12 := p2 - p12 = [-10.8571; 0; 0]
V13 := p4 - p12 = [-2.85714; -5; 0]
α := acos(V12*V13/(|V12|*|V13|)) = 1.05165
α/deg = 60.2551
# Задание 10
p1 = [9; 16; 0]
p9 = [7.76712; 13.2877; 0]
nl14 := (p1 - p9)/|p1 - p9|
ln14(t) := p9 + t*nl14
lnn14(u, v) := p9 + u*nl14
k14 := sqrt((9 - 7.767)^2 + (16 - 13.288)^2) = 2.97913
lin14 := CreateMesh(lnn14, -k14, k14, 0, 0)
P14(x, y) := [2*7.767 - x1; 2*13.288 - y1; 0]
T14 := CreateMesh(P14, 0, 0, 0, 0)
# [component: inputs [(T1, lin1, lin2, lin3, lin4, lin5, lin10, T9, lin14, T14), □, □, □, □, □, □, □, □, □]]
# Задание 4,5,6
p6 = [12; 13; 0]
p7 = [7.5; 9; 0]
p8 = [13; 6.5; 0]  # Параметрическая форма
px6(t) := 4.5*t + 12
px7(t) := -5.5*t + 7.5
px8(t) := -t + 13
(x - 12)/(7.5 - 12) == (y - 13)/(9 - 13)
(x - 7.5)/(13 - 7.5) == (y - 9)/(6.5 - 9)
(x - 13)/(12 - 13) == (y - 6.5)/(13 - 6.5)
py6(t) := 4*t + 13
py7(t) := 2.5*t + 9
py8(t) := 6.5*t + 6.5
2.5*x + 5.5*y - 68.25 == 0
6.5*x + y - 91 == 0
4*x - 4.5*y + 10.5 == 0
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F8(x) := -6.5*x/1 + 91/1
F6(x) := 4*x/4.5 + 10.5/4.5
F7(x) := -2.5*x/5.5 + 68.25/5.5
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