# Пример 2.1
x[1] := -1
y[1] := -1
x[2] := 1
y[2] := 1
k := (y[2] - y[1])/(x[2] - x[1]) = 1
r := sqrt((x[2] - x[1])^2 + (y[2] - y[1])^2) = 2.82843
L(x) := k*(x - x[1]) + y[1]
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B
A
# Пример 2.3
x1 := -1
y1 := -1
x2 := 1
y2 := 1
x3 := -1
y3 := 1
P1(x, y) := [x1; y1; 0]
P2(x, y) := [x2; y2; 0]
P3(x, y) := [x3; y3; 0]
T1 := CreateMesh(P1, x1, x1, y1, y1)
T2 := CreateMesh(P2, x2, x2, y2, y2)
T3 := CreateMesh(P3, x3, x3, y3, y3)
Ln12(u, v) := [x1 + (x2 - x1)*u; y1 + (y2 - y1)*u; 0]
L12 := CreateMesh(Ln12, 0, 1, 0, 0)
Ln35(u, v) := P3(u, v) + [(x2 - x1)*u; (y2 - y1)*u; 0]
L35 := CreateMesh(Ln35, 0, 1, 0, 0)
P5(u, v) := Ln35(1, 0)
T5 := CreateMesh(P5, 1, 1, 0, 0)
# [component: inputs T1, T2, T3, L12, L35, T5]
