# Пример 3.1
x0 := 1
y0 := 2
z0 := 3
x1 := 2
y1 := 1
z1 := 2
T1(x, y) := [x0; y0; z0]
T2(x, y) := [x1; y1; z1]
Line(u, v) := [x0 + (x1 - x0)*u; y0 + (y1 - y0)*u; z0 + (z1 - z0)*u]
L := CreateMesh(Line, 0, 1, 0, 0)
# [component: inputs T1, T2, L]
# Пример 3.2
A1 := [1; 1; 1]
B1 := [10; 10; 10]
n1 := (B1 - A1)/|B1 - A1|
f1(t) := A1 + t*n1
Line1 := CreateSpace(f1, 0, 10, 50)
A2 := [2; 1; 4]
B2 := [1; 15; 6]
n2 := (B2 - A2)/|B2 - A2|
f2(t) := A2 + t*n2
Line2 := CreateSpace(f2, 0, 10, 90)
t1 := 0
t2 := 0
Given
(f1(t1) - f2(t2))*n1 == 0
(f1(t1) - f2(t2))*n2 == 0
S := Find(t1, t2)
S = [3.34038; 1.68779]
t1 := S[0]
t2 := S[1]
P1 := f1(t1)
P2 := f2(t2)
G(t) := P1 + t*(P2 - P1)
Perpendicular := CreateSpace(G, 0, 1, 20)
# [component: inputs Line1, Line2, Perpendicular]
# Пример 3.4
x40 := 1
y40 := 2
z40 := 3
x41 := 2
y41 := 1
z41 := 2
x42 := 3
y42 := 3
z42 := 1
det([x40, x41, x42; y40, y41, y42; z40, z41, z42]) = 12
det([x - x40, y - y40, z - z40; x41 - x40, y41 - y40, z41 - z40; x42 - x40, y42 - y40, z42 - z40]) → 3*x + 3*z - 12
3*x + 3*z - 12 == 0 solve, z → 4 - x
z(x, y) := -x + 4
Plane(x, y) := [x; y; z(x, y)]
T3(x, y) := [x42; y42; z42]
P := CreateMesh(Plane, 0, 6, 0, 6, 7, 6)
# [component: inputs P, T1, T2, T3]
Line01(t, u) := [x40 + (x41 - x40)*t; y40 + (y41 - y40)*t; z40 + (z41 - z40)*t]
Line12(t, u) := [x41 + (x42 - x41)*t; y41 + (y42 - y41)*t; z41 + (z42 - z41)*t]
Line02(t, u) := [x40 + (x42 - x40)*t; y40 + (y42 - y40)*t; z40 + (z42 - z40)*t]
L01 := CreateMesh(Line01, 0, 1, 0, 0)
L12 := CreateMesh(Line12, 0, 1, 0, 0)
L02 := CreateMesh(Line02, 0, 1, 0, 0)
# [component: inputs P, T1, T2, T3, L01, L12, L02]
