# Задание 2
A := [19; 8; 2]
B := [14; 3; 13]
C := [7; 17; 10]
D := [3; 8; 11]
p1(x, y) := A
p2(x, y) := B
p3(x, y) := C
p4(x, y) := D
v1 := [A[0], B[0], C[0], A[0], D[0], C[0], B[0], D[0]]
v2 := [A[1], B[1], C[1], A[1], D[1], C[1], B[1], D[1]]
v3 := [A[2], B[2], C[2], A[2], D[2], C[2], B[2], D[2]]
P(A, B, C, D) := [v1; v2; v3]
# [component: inputs P(A, B, C, D), p1, p2, p3, p4]
# Задание 3
# BD - AC
Line1(t, u) := [B[0] + (D[0] - B[0])*t; B[1] + (D[1] - B[1])*t; B[2] + (D[2] - B[2])*t]
Line2(t, u) := [A[0] + (C[0] - A[0])*t; A[1] + (C[1] - A[1])*t; A[2] + (C[2] - A[2])*t]
L1 := CreateMesh(Line1, 0, 1, 0, 0)
L2 := CreateMesh(Line2, 0, 1, 0, 0)
B = [14; 3; 13]
D = [3; 8; 11]
n1 := (D - B)/|D - B|
f1(t) := B + t*n1
A = [19; 8; 2]
C = [7; 17; 10]
n2 := (C - A)/|C - A|
f2(t) := A + t*n2
t1 := 0
t2 := 0
Given
(f1(t1) - f2(t2))*n1 == 0
(f1(t1) - f2(t2))*n2 == 0
S := Find(t1, t2) = [10.0283; 13.8134]
t1 := S[0]
t2 := S[1]
P1 := f1(t1)
P2 := f2(t2)
Line3(t, u) := [P1[0] + (P2[0] - P1[0])*t; P1[1] + (P2[1] - P1[1])*t; P1[2] + (P2[2] - P1[2])*t]
L3 := CreateMesh(Line3, 0, 1, 0, 0)
# [component: inputs P(A, B, C, D), p1, p2, p3, p4, L1, L2, L3]
# Задание 4
Line4(u, v) := p1(u, v) + [(B[0] - D[0])*u; (B[1] - D[1])*u; (B[2] - D[2])*u]
L4 := CreateMesh(Line4, -1, 1, 0, 0)
P5 := [A[0] - (D[0] - B[0]); A[1] - (D[1] - B[1]); A[2] - (D[2] - B[2])] = [30; 3; 4]
p5(x, y) := P5
D = [3; 8; 11]
B = [14; 3; 13]
n3 := (D - B)/|D - B|
f3(t) := B + t*n3
A = [19; 8; 2]
P5 = [30; 3; 4]
n4 := (A - P5)/|A - P5|
f4(t) := P5 + t*n4
t3 := 0
t4 := 0
Given
(f3(t3) - f4(t4))*n3 == 0
(f3(t3) - f4(t4))*n4 == 0
S1 := Find(t3, t4) = [-4.90065; 8]
t3 := S1[0]
t4 := S1[1]
P3 := f3(t1)
P4 := f4(t2)
Line5(t, u) := [P3[0] + (P4[0] - P3[0])*t; P3[1] + (P4[1] - P3[1])*t; P3[2] + (P4[2] - P3[2])*t]
L5 := CreateMesh(Line5, 0, 1, 0, 0)
# [component: inputs [(P(A, B, C, D), p1, p2, p3, p4, L4, p5, L5), □, □, □, □, □, □, □]]
# Задание 5
det([
    x - A[0], y - A[1], z - A[2];
    B[0] - A[0], B[1] - A[1], B[2] - A[2];
    C[0] - A[0], C[1] - A[1], C[2] - A[2]
]) → 3587 - 92*y - 105*z - 139*x
3587 - 92*y - 105*z - 139*x == 0 solve, z → 3587/105 - 92*y/105 - 139*x/105
z(x, y) := 3587/105 - 92*y/105 - 139*x/105
Plane(x, y) := [x; y; z(x, y)]
Plos := CreateMesh(Plane, 5, 20, 0, 20, 10, 10)
# [component: inputs [(P(A, B, C, D), p1, p2, p3, p4, Plos), □, □, □, □, □]]
# Задание 6
B = [14; 3; 13]
V6 := B - C = [7; -14; 3]
V6[0]*(x - B[0]) + V6[1]*(y - B[1]) + V6[2]*(z - B[2]) → 7*x - 14*y + 3*function - 95
7*x - 14*y + 3*z - 95 == 0
Z6(x, y) := -7/3*x + 14/3*y + 95/3
Plos6 := CreateMesh(Z6, 10, 17, 10, -1, 10, 10)
# [component: inputs [(P(A, B, C, D), p1, p2, p3, p4, Plos6), □, □, □, □, □]]
# Задание 7
B = [14; 3; 13]
V2 := C - B = [-7; 14; -3]
V3 := A - B = [5; 5; -11]
det([x - B[0], V2[0], V3[0]; y - B[1], V2[1], V3[1]; z - B[2], V2[2], V3[2]]) → 3587 - 92*y - 105*function - 139*x
-139*x - 92*y - 105*z + 3587 == 0
Z7(x, y) := -139/105*x - 92/105*y + 3587/105
Plos7 := CreateMesh(Z7, 5, 20, 18, 0, 10, 10)
# [component: inputs [(P(A, B, C, D), p1, p2, p3, p4, Plos7), □, □, □, □, □]]
# Задание 8
19*x + 4*y + 4*z + 14 == 0
Z8(x, y) := -19/4*x - 4/4*y - 14/4
Plos8 := CreateMesh(Z8, 0, 6, 0, 6, 10, 10)
# [component: inputs Plos8]
# Задание 9
x/7 + y/17 + z/10 - 1 == 0
A9 := [7; 0; 0]
B9 := [0; 17; 0]
C9 := [0; 0; 10]
det([
    x - A9[0], y - A9[1], z - A9[2];
    B9[0] - A9[0], B9[1] - A9[1], B9[2] - A9[2];
    C9[0] - A9[0], C9[1] - A9[1], C9[2] - A9[2]
]) → 170*x + 70*y + 119*function - 1190
170*x + 70*y + 119*z - 1190 == 0
Z9(x, y) := -170/119*x - 70/119*y + 1190/119
Plos9 := CreateMesh(Z9, 0, 6, 0, 6, 10, 10)
# [component: inputs Plos9]
