# Пример 4.1
x2 := 0
y2 := 5
z2 := 0
x3 := 5
y3 := 0
z3 := 5
T2(x, y) := [x2; y2; z2]
T3(x, y) := [x3; y3; z3]
Plane1(x, y) := [x; y; 2]
P1 := CreateMesh(Plane1, 0, 6, 0, 6, 7, 6)
Line23(t, u) := [x2 + (x3 - x2)*t; y2 + (y3 - y2)*t; z2 + (z3 - z2)*t]
L23 := CreateMesh(Line23, 0, 1, 0, 0)
# [component: inputs T2, T3, P1, L23]
# Пример 4.3
O := [1; 2; 3]
P1 := [5; 4; 6]
P2 := [3; 2; 3]
n1 := (P1 - O)/|P1 - O|
n2 := (P2 - O)/|P2 - O|
Σ(t1, t2) := O + t1*n1 + t2*n2
Plane := CreateMesh(Σ, -5, 5, -5, 5, 40, 40)
T := [-1; 3; 6]
T1 := [2; 1; 1]
n := (T1 - T)/|T1 - T|
L(t) := T + t*n
Line := CreateSpace(L, -5, 15, 40)
# [component: inputs Plane, Line]
# Случай 1
v0 := [0; 0; 0]
C := v0
h := 0
Given
(C - O)*(n1×n2) == 0
(C - L(h))*n == 0
C == L(h)
S1 := Find(C, h) = [[1.25; 1.5; 2.25]; 4.62331]
V := S1[0]
V = [1.25; 1.5; 2.25]
# Случай 2
C := v0
Given
(C - O)*(n1×n2) == 0
(C - T)×n == v0
S2 := Find(C) = [1.25; 1.5; 2.25]
# Пример 4.4
x0 := 1
y0 := 2
z0 := 3
x1 := 2
y1 := 1
z1 := 2
x2 := 3
y2 := 3
z2 := 1
det([x - x0, y - y0, z - z0; x1 - x0, y1 - y0, z1 - z0; x2 - x0, y2 - y0, z2 - z0]) → 3*x + 3*z - 12
3*x + 3*z - 12 == 0 solve, z → 4 - x
p1 := -1
p2 := 0
p3 := -1
p4 := 4
z(x, y) := (p1*x + p2*y + p4)/(-p3)
Plane(x, y) := [x; y; z(x, y)]
T0(x, y) := [x0; y0; z0]
T1(x, y) := [x1; y1; z1]
T2(x, y) := [x2; y2; z2]
P := CreateMesh(Plane, 0, 6, 0, 6, 7, 6)
x3 := 3
y3 := 3
z3 := 8
p1*(xx - x3) + p2*(yy - y3) + p3*(zz - z3) == 0 solve, zz → 11 - xx
Plane2(xx, yy) := [xx; yy; 11 - xx]
T3(x, y) := [x3; y3; z3]
P2 := CreateMesh(Plane2, 0, 6, 0, 6, 7, 6)
# [component: inputs P, T0, T1, T2, T3, P2]
# Пример 4.5
x1 := 5
y1 := 0
z1 := 0
x2 := 0
y2 := 5
z2 := 0
x3 := 5
y3 := 0
z3 := 5
T1(x, y) := [x1; y1; z1]
T2(x, y) := [x2; y2; z2]
T3(x, y) := [x3; y3; z3]
det([x - x1, y - y1, z - z1; x2 - x1, y2 - y1, z2 - z1; x3 - x1, y3 - y1, z3 - z1]) → 25*x + 25*y - 125
25*x + 25*y + 0*z - 125 == 0 solve, y → 5 - x
Plane2(x, z) := [x; 5 - x; z]
Plane1(x, y) := [x; y; 4]
P2 := CreateMesh(Plane2, 0, 6, 0, 6, 7, 6)
P1 := CreateMesh(Plane1, 0, 6, 0, 6, 7, 6)
# [component: inputs T1, T2, T3, P2, P1]
