# Задание 2
A := [15; 17; 12]
B := [16; 8; 3]
C := [9; 9; 8]
M := [7; 1; 18]
N := [14; 8; 1]
P := [18; 7; 17]
tri1(t, u) := [A[0] + (B[0] - A[0])*t; A[1] + (B[1] - A[1])*t; A[2] + (B[2] - A[2])*t]
tri2(t, u) := [B[0] + (C[0] - B[0])*t; B[1] + (C[1] - B[1])*t; B[2] + (C[2] - B[2])*t]
tri3(t, u) := [C[0] + (A[0] - C[0])*t; C[1] + (A[1] - C[1])*t; C[2] + (A[2] - C[2])*t]
LT1 := CreateMesh(tri1, 0, 1, 0, 0)
LT2 := CreateMesh(tri2, 0, 1, 0, 0)
LT3 := CreateMesh(tri3, 0, 1, 0, 0)
line1(t, u) := [M[0] + (N[0] - M[0])*t; M[1] + (N[1] - M[1])*t; M[2] + (N[2] - M[2])*t]
L1 := CreateMesh(line1, 0, 1, 0, 0)
T1(x, y) := P
# [component: inputs LT1, LT2, LT3, L1, T1]
# Задание 3
V3 := N - M = [7; 7; -17]
H3 := (P - M)×V3 = [-95; 180; 35]
Vp := H3×V3
Lp(t, u) := P + Vp*t
L3 := CreateMesh(Lp, 0, 0.0026, 0, 0)
|H3|/|V3| = 10.4979
-длина*перпендикуляра
# [component: inputs L1, T1, L3]
# Задание 4
det([
    x - A[0], y - A[1], z - A[2];
    B[0] - A[0], B[1] - A[1], B[2] - A[2];
    C[0] - A[0], C[1] - A[1], C[2] - A[2]
]) → 58*y - 36*x - 62*z + 298
58*y - 36*x - 62*z + 298 == 0 solve, z → 29*y/31 - 18*x/31 + 149/31
z(x, y) := 29*y/31 - 18*x/31 + 149/31
P4 := CreateMesh(z, 6, 20, 6, 20, 10, 10)
# [component: inputs LT1, LT2, LT3, P4]
# Задание 5
M = [7; 1; 18]
N = [14; 8; 1]
(x - M[0])/(N[0] - M[0]) == (y - M[1])/(N[1] - M[1]) == (z - M[2])/(N[2] - M[2]) == t
x5(t) := 7 + 7*t
y5(t) := 1 + 7*t
z5(t) := 18 - 17*t
-36*x + 58*y - 62*z + 298 == 0
t5 := 253/302
T5(x, y) := [x5(t5); y5(t5); z5(t5)]
# [component: inputs P4, L1, T5]
# Задание 6
P6 := [P[0] + (A[0] - B[0]); P[1] + (A[1] - B[1]); P[2] + (A[2] - B[2])]
T6(x, y) := P6
line6(t, u) := [P[0] + (P6[0] - P[0])*t; P[1] + (P6[1] - P[1])*t; P[2] + (P6[2] - P[2])*t]
L6 := CreateMesh(line6, 0, 1, 0, 0)
# [component: inputs P4, T1, T6, L6]
# Задание 7
P = [18; 7; 17]
V7 := B - A = [1; -9; -9]
W7 := C - A = [-6; -8; -4]
N7 := V7×W7 = [-36; 58; -62]
Lp7(t, u) := P + N7*t
P7_1 := Lp7(1, 1) = [-18; 65; -45]
n := (P7_1 - P)/|P7_1 - P|
n1 := (B - A)/|B - A|
n2 := (C - A)/|C - A|
v0 := [0; 0; 0]
L7 := CreateMesh(Lp7, 0, 0.232, 0, 0)
Given
(v0 - A)*(n1×n2) == 0
(v0 - P7_1)×n == 0  # Задание 8
P7 := Find(v0) = [13.7752; 13.8067; 9.72389]
T7(x, y) := P7
P7 = [13.7752; 13.8067; 9.72389]
P = [18; 7; 17]
P8 := [P7[0] - (P[0] - P7[0]); P7[1] - (P[1] - P7[1]); P7[2] - (P[2] - P7[2])]
T8(x, y) := P8
|P7 - P| = 10.8223
-длина*перпендикуляра
# [component: inputs P4, T1, L7, T7, T8]
# Задание 9
-36*x + 58*y - 62*z + 298 == 0
-уравнение*плоскости
P = [18; 7; 17]
-36*(x - 18) + 58*(y - 7) - 62*(z - 17) == 0
-36*x + 58*y - 62*z + 1296 == 0
z9(x, y) := -18/31*x + 29/31*y + 648/31
P9 := CreateMesh(z9, 6, 20, 6, 20, 10, 10)
# [component: inputs P4, T1, P9]
# Задание 10
P = [18; 7; 17]
P6 = [17; 16; 26]
-36*x + 58*y - 62*z + 1296 == 0
det([x - P6[0], y - P6[1], z - P6[2]; P[0] - P6[0], P[1] - P6[1], P[2] - P6[2]; -36, 58, -62]) → 1080*x + 386*y - 266*function - 17620
z10(x, y) := 540/133*x + 193/133*y - 8810/133
AA(x, y) := A
BB(x, y) := B
CC(x, y) := C
P10 := CreateMesh(z10, 6, 20, 6, 20, 10, 10)
# [component: inputs [(P4, P10, T1, T6), □, □, □]]
# Задание 11
# Задание 14
N7 = [-36; 58; -62]
P = [18; 7; 17]
P6 = [17; 16; 26]
P7 = [13.7752; 13.8067; 9.72389]
N11 := (P - P6)×(P7 - P6) = [126.745; 45.2996; -31.2168]
A = [15; 17; 12]
B = [16; 8; 3]
P = [18; 7; 17]
N11_2 := N7×N11 = [998; -8982; -8982]
det([
    x - B[0], y - B[1], z - B[2];
    A[0] - B[0], A[1] - B[1], A[2] - B[2];
    P[0] - B[0], P[1] - B[1], P[2] - B[2]
]) → 135*x + 32*y - 17*function - 2365
line11(t, u) := [P7[0] + N11_2[0]*t; P7[1] + N11_2[1]*t; P7[2] + N11_2[2]*t]
L11 := CreateMesh(line11, -0.1, 0.1, 0, 0)
Tb(x, y) := B
Ta(x, y) := A
Tp(x, y) := P
z14(x, y) := 135/17*x + 32/17*y + (-2365/17)
P4 := CreateMesh(z, 6, 20, -20, 20, 10, 10)
P10 := CreateMesh(z10, 6, 20, -20, 20, 10, 10)
P14 := CreateMesh(z14, 0, 20, 0, 20, 10, 10)
# [component: inputs [(P4, P10, T1, T6, L11, T7), □, □, □, □, □]]
# [component: inputs [(Tb, Ta, Tp, P14, LT1), □, □, □, □]]
# Задание 12
P7 = [13.7752; 13.8067; 9.72389]
N7 = [-36; 58; -62]
N11 = [126.745; 45.2996; -31.2168]
p12(t, u) := P7 + N7*t + N11*u
P12 := CreateMesh(p12, -0.1, 0.1, -0.1, 0.1, 10, 10)
# [component: inputs [(P4, P10, P12, T7), □, □, □]]
# Задание 13
n13_1 := N7/|N7|
n13_2 := N11/|N11|
N13 := n13_1 + n13_2
tt13 := line11(0.003, 1) = [16.7692; -13.1393; -17.2221]
P7 = [13.7752; 13.8067; 9.72389]
tt13_1 := P7 + N13 = [14.3021; 14.7635; 8.82564]
det([
    x - tt13[0], y - tt13[1], z - tt13[2];
    tt13_1[0] - tt13[0], tt13_1[1] - tt13[1], tt13_1[2] - tt13[2];
    P7[0] - tt13[0], P7[1] - tt13[1], P7[2] - tt13[2]
]) → 49.9865235393*x - 11.5093178823*y + 17.0633760533*function - 695.58960194
49.9865235393*x - 11.5093178823*y + 17.0633760533*z - 695.58960194 == 0
z13(x, y) := -49.9865235393/17.0633760533*x - (-11.5093178823/17.0633760533*y) - (-695.58960194/17.0633760533)
P13 := CreateMesh(z13, 6, 20, 6, 20, 10, 10)
# [component: inputs [(P4, P10, P13), □, □]]
