# Пример 5.1
cx := 3
cy := 5
r := 5
ϕ := 0.0, 0.1 .. 2*π
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# Пример 5.2
rx := 5
ry := 3
φ := 0, 0.1*π .. 2*π
x(φ) := rx*cos(φ) + cx
y(φ) := ry*sin(φ) + cy
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# Пример 5.3
(u3 - cx3)^2/rx3^2 - (v3 - cy3)^2/ry3^2 == 1 solve, v3 → [
    cy3 + ry3*sqrt(cx3 + rx3 - u3)*sqrt(cx3 - rx3 - u3)/rx3;
    cy3 - ry3*sqrt(cx3 + rx3 - u3)*sqrt(cx3 - rx3 - u3)/rx3
]
rx3 := 5
ry3 := 3
cx3 := 3
cy3 := 5
par13(u3) := cy3 + ry3*sqrt(cx3 + rx3 - u3)*sqrt(cx3 - rx3 - u3)/rx3
par23(u3) := cy3 - ry3*sqrt(cx3 + rx3 - u3)*sqrt(cx3 - rx3 - u3)/rx3
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# Пример 5.4
(y4 - cy4)^2 == 2*p4*(x4 - cx4) solve, x4 → ((cy4 - y4)^2 + 2*cx4*p4)/(2*p4)
p4 := 5
cx4 := 3
cy4 := 5
par4(y4) := ((cy4 - y4)^2 + 2*cx4*p4)/(2*p4)
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# Пример 5.7
y7(x7) := sin(2*x7) + cos(3*x7)
y71(x7) := d/dx7(y7(x7)) → 2*cos(2*x7) - 3*sin(3*x7)
y72(x7) := d^2/dx7^2(y7(x7)) → -9*cos(3*x7) - 4*sin(2*x7)
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# Пример 5.8
y8(x8) := cos(x8)
a8 := 1
y81(x8) := d/dx8(y8(x8)) → -sin(x8)
y81(a8) = -0.841471
k8(x8) := y8(a8) + y81(a8)*(x8 - a8)
n8(x8) := y8(a8) - 1/y81(a8)*(x8 - a8)
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# Пример 5.9
f9(t9) := 2*e^t9
y9(t9) := e^(-t9)
t90 := 0
a9 := f9(t90)
a9 = 2
y9(t90) = 1
f91(t9) := d/dt9(f9(t9)) → 2*e^t9
y91(t9) := d/dt9(y9(t9)) → -e^(-t9)
k9(x9) := y9(t90) + (x9 - a9)*y91(t90)/f91(t90)
n9(x9) := y9(t90) - f91(t90)/y91(t90)*(x9 - a9)
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# Пример 5.10
φ10 := 0, 0.1 .. 3.5*π
x10(φ10) := sin(φ10)
y10(φ10) := 2^(-0.6*φ10)
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φ10 := 3
Given
sin(φ10) == 2^(-0.6*φ10)
Find(φ10) = 2.82801
# Пример 5.11
u11(v11) := sqrt(4 - v11^2)
w11(v11) := v11^2
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X1 := root(u11(v11) - w11(v11), v11, 1, 15) = 1.24962
Y1 := u11(X1) = 1.56155
X2 := root(u11(v11) - w11(v11), v11, -1.5, -1) = -1.24962
Y2 := u11(X2) = 1.56155
