# Пример 6.1
m := ORIGIN
n := 10
i := m .. n
j := i
x[i] := i
y[i] := sin(x[i])
Larg(t) := y[m]*product((t - x[j])/(x[m] - x[j]), j = m + 1 .. n) + y[n]*product((t - x[j])/(x[n] - x[j]), j = m .. n - 1) + sum((y[i]*product((t - x[j])/(x[i] - x[j]), j = m .. i - 1))*product((t - x[j])/(x[i] - x[j]), j = i + 1 .. n), i = m + 1 .. n - 1)
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# Пример 6.2
m := ORIGIN
n := 10
i := m .. n
j := i
x[i] := i
y[i] := x[i]^2
L(t) :=
    l ← 0
    for i ∈ m .. n
        p ← 1
        for j ∈ m .. n
            p ← p*(t - x[j])/(x[i] - x[j]) if i ≠ j
        l ← l + y[i]*p
    l
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# Пример 6.3
m := ORIGIN
n := 10
i := m .. n
j := i
x[i] := i
y[i] := sin(x)
Larg(t, x, y) := y[m]*product((t - x[j])/(x[m] - x[j]), j = m + 1 .. n) + y[n]*product((t - x[j])/(x[n] - x[j]), j = m .. n - 1) + sum(y[i]*product((t - x[j])/(x[i] - x[j]), j = m .. i - 1)*product((t - x[j])/(x[i] - x[j]), j = i + 1 .. n), i = m + 1 .. n - 1)
T[i] := i*2*π/n
X[i] := cos(T[i])
Y[i] := sin(T[i])
k := 0 .. 200
p[k] := T[0] + (T[n] - T[0])*k/200
Lx(p) := Larg(p, T, X)
Ly(p) := Larg(p, T, Y)
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# Пример 6.4
ORIGIN := 0
M := 5
i := 0 .. M
f(t) := t^2
p(t) := d/dt(f(t))
X[i] := i
Y[i] := f(X[i])
pY[i] := p(X[i])
i := 0 .. M - 1
h[i] := X[i + 1] - X[i]
a0(v) := 1 - 3*v^2 + 2*v^3
a1(v) := 3*v^2 - 2*v^3
b0(v) := v - 2*v^2 + v^3
b1(v) := -v^2 + v^3
u(t) :=
    u ← 0
    for i ∈ 0 .. M - 1
        u ← (t - X[i])/h[i] if X[i] ≤ t < X[i + 1]
    u
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Emit(t) :=
    E ← 0
    for i ∈ 0 .. M - 1
        if X[i] ≤ t < X[i + 1]
            Z ← (t - X[i])/h[i]
            E ← Y[i]*a0(Z) + Y[i + 1]*a1(Z) + pY[i]*b0(Z)*h[i] + pY[i + 1]*b1(Z)*h[i]
    E
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# Пример 6.5
x0 := 0
x1 := 2
x2 := 3
x3 := 4
y0 := 0
y1 := 4.8
y2 := 0.2
y3 := 1
t := 0, 0.05 .. 1
Px1(t) := (1 - t)*x0 + t*x1
Py1(t) := (1 - t)*y0 + t*y1
Px2(t) := (1 - t)^2*x0 + 2*t*(1 - t)*x1 + t^2*x2
Py2(t) := (1 - t)^2*y0 + 2*t*(1 - t)*y1 + t^2*y2
Px3(t) := (1 - t)^3*x0 + 3*t*(1 - t)^2*x1 + 3*t^2*(1 - t)*x2 + t^3*x3
Py3(t) := (1 - t)^3*y0 + 3*t*(1 - t)^2*y1 + 3*t^2*(1 - t)*y2 + t^3*y3
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