# Задание 2
m := 11
n := 23
i := m .. n
x[i] := i*3/11
y[i] := x[i]*e^(-x[i]/2)
xx[i] := i*3/11
yy[i] := xx[i]*e^(-xx[i]/2)
x[i] = [3; 3.27273; 3.54545; 3.81818; 4.09091; 4.36364; 4.63636; 4.90909; 5.18182; 5.45455; 5.72727; 6; 6.27273]
y[i] = [0.66939; 0.637156; 0.602263; 0.565912; 0.529042; 0.492376; 0.456461; 0.421702; 0.388387; 0.356713; 0.326803; 0.298722; 0.27249]
y2(t) := t*e^(-t/2)
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# Задание 3
Lagr(t) := y[m]*product((t - x[j])/(x[m] - x[j]), j = m + 1 .. n) + y[n]*product((t - x[j])/(x[n] - x[j]), j = m .. n - 1) + sum((y[i]*product((t - x[j])/(x[i] - x[j]), j = m .. i - 1))*product((t - x[j])/(x[i] - x[j]), j = i + 1 .. n), i = m + 1 .. n - 1)
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# Задание 4
r4 := 14
r4_1 := 7
xc4(t) := (r4 + r4_1)*sin(t) - r4*sin((r4_1/r4 + 1)*t)
yc4(t) := (r4 + r4_1)*cos(t) - r4*cos((r4_1/r4 + 1)*t)
a := -2*π
b := 2*π
t := a, a + 0.0001*π .. b
m := 0
n := 17
i := m .. n
j := i
T[i] := a + i*(b - a)/n
X[i] := xc4(T[i])
Y[i] := yc4(T[i])
L(t, x, y) := y[m]*product((t - x[j])/(x[m] - x[j]), j = m + 1 .. n) + y[n]*product((t - x[j])/(x[n] - x[j]), j = m .. n - 1) + sum((y[i]*product((t - x[j])/(x[i] - x[j]), j = m .. i - 1))*product((t - x[j])/(x[i] - x[j]), j = i + 1 .. n), i = m + 1 .. n - 1)
k := 0 .. 200
p[k] := T[0] + (T[n] - T[0])*k/200
Lx(p) := L(p, T, X)
Ly(p) := L(p, T, Y)
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# Задание 5
N := 11
M := 22
i := N .. M
f(t) := t*e^(-t/2)
p(t) := d/dt(f(t))
X[i] := i*3/11
Y[i] := f(X[i])
pY[i] := p(X[i])
i := N .. M - 1
h[i] := X[i + 1] - X[i]
u(t) :=
    u ← 0
    for i ∈ N .. M - 1
        u ← (t - X[i])/h[i] if X[i] ≤ t < X[i + 1]
    u
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# Задание 6
t := 0, 0.05 .. 1
A2 := [x[14]; y2(x[14])]
B2 := [x[15]; y2(x[15])]
C2 := [x[16]; y2(x[16])]
D2 := [x[17]; y2(x[17])]
A := [0; y2(0)]
B := [1; y2(1)]
C := [2; y2(2)]
D := [3; y2(3)]
A4 := [x[20]; y2(x[20])]
B4 := [x[21]; y2(x[21])]
C4 := [x[22]; y2(x[22])]
D4 := [x[23]; y2(x[23])]
Px3(t) := (1 - t)^3*A[0] + 3*t*(1 - t)^2*B[0] + 3*t^2*(1 - t)*C[0] + t^3*D[0]
Px32(t) := (1 - t)^3*A2[0] + 3*t*(1 - t)^2*B2[0] + 3*t^2*(1 - t)*C2[0] + t^3*D2[0]
Px34(t) := (1 - t)^3*A4[0] + 3*t*(1 - t)^2*B4[0] + 3*t^2*(1 - t)*C4[0] + t^3*D4[0]
Py3(t) := (1 - t)^3*A[1] + 3*t*(1 - t)^2*B[1] + 3*t^2*(1 - t)*C[1] + t^3*D[1]
Py32(t) := (1 - t)^3*A2[1] + 3*t*(1 - t)^2*B2[1] + 3*t^2*(1 - t)*C2[1] + t^3*D2[1]
Py34(t) := (1 - t)^3*A4[1] + 3*t*(1 - t)^2*B4[1] + 3*t^2*(1 - t)*C4[1] + t^3*D4[1]
A1 := [x[11]; y2(x[11])]
B1 := [x[12]; y2(x[12])]
C1 := [x[13]; y2(x[13])]
D1 := [x[14]; y2(x[14])]
A3 := [x[17]; y2(x[17])]
B3 := [x[18]; y2(x[18])]
C3 := [x[19]; y2(x[19])]
D3 := [x[20]; y2(x[20])]
Px31(t) := (1 - t)^3*A1[0] + 3*t*(1 - t)^2*B1[0] + 3*t^2*(1 - t)*C1[0] + t^3*D1[0]
Px33(t) := (1 - t)^3*A3[0] + 3*t*(1 - t)^2*B3[0] + 3*t^2*(1 - t)*C3[0] + t^3*D3[0]
Py31(t) := (1 - t)^3*A1[1] + 3*t*(1 - t)^2*B1[1] + 3*t^2*(1 - t)*C1[1] + t^3*D1[1]
Py33(t) := (1 - t)^3*A3[1] + 3*t*(1 - t)^2*B3[1] + 3*t^2*(1 - t)*C3[1] + t^3*D3[1]
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# Задание 7
funcX(A, B, C, D, t) :=
    a0 ← (A[0] + 4*B[0] + C[0])/6
    a1 ← (-A[0] + C[0])/2
    a2 ← (A[0] - 2*B[0] + C[0])/2
    a3 ← (-A[0] + 3*B[0] - 3*C[0] + D[0])/6
    x ← a0 + a1*t + a2*t^2 + a3*t^3
    x
funcY(A, B, C, D, t) :=
    b0 ← (A[1] + 4*B[1] + C[1])/6
    b1 ← (-A[1] + C[1])/2
    b2 ← (A[1] - 2*B[1] + C[1])/2
    b3 ← (-A[1] + 3*B[1] - 3*C[1] + D[1])/6
    y ← b0 + b1*t + b2*t^2 + b3*t^3
    y
A = [0; 0]
B = [1; 0.606531]
C = [2; 0.735759]
D = [3; 0.66939]
x7(t) := funcX(A, B, C, D, t)
y7(t) := funcY(A, B, C, D, t)
A1 := [1; 0.607]
B1 := [2; 0.736]
C1 := [3; 0.669]
D1 := [x[11]; y2(x[11])]
x71(t) := funcX(A1, B1, C1, D1, t)
y71(t) := funcY(A1, B1, C1, D1, t)
A2 := [2; y2(2)]
B2 := [3; y2(3)]
C2 := [x[11]; y2(x[11])]
D2 := [x[12]; y2(x[12])]
x72(t) := funcX(A2, B2, C2, D2, t)
y72(t) := funcY(A2, B2, C2, D2, t)
A := [3; y2(3)]
B := [x[11]; y2(x[11])]
C := [x[12]; y2(x[12])]
D := [x[13]; y2(x[13])]
x73(t) := funcX(A, B, C, D, t)
y73(t) := funcY(A, B, C, D, t)
A := [x[11]; y2(x[11])]
B := [x[12]; y2(x[12])]
C := [x[13]; y2(x[13])]
D := [x[14]; y2(x[14])]
x74(t) := funcX(A, B, C, D, t)
y74(t) := funcY(A, B, C, D, t)
A := [x[12]; y2(x[12])]
B := [x[13]; y2(x[13])]
C := [x[14]; y2(x[14])]
D := [x[15]; y2(x[15])]
x75(t) := funcX(A, B, C, D, t)
y75(t) := funcY(A, B, C, D, t)
A := [x[13]; y2(x[13])]
B := [x[14]; y2(x[14])]
C := [x[15]; y2(x[15])]
D := [x[16]; y2(x[16])]
x76(t) := funcX(A, B, C, D, t)
y76(t) := funcY(A, B, C, D, t)
A := [x[14]; y2(x[14])]
B := [x[15]; y2(x[15])]
C := [x[16]; y2(x[16])]
D := [x[17]; y2(x[17])]
x77(t) := funcX(A, B, C, D, t)
y77(t) := funcY(A, B, C, D, t)
A := [x[15]; y2(x[15])]
B := [x[16]; y2(x[16])]
C := [x[17]; y2(x[17])]
D := [x[18]; y2(x[18])]
x78(t) := funcX(A, B, C, D, t)
y78(t) := funcY(A, B, C, D, t)
A := [x[16]; y2(x[16])]
B := [x[17]; y2(x[17])]
C := [x[18]; y2(x[18])]
D := [x[19]; y2(x[19])]
x79(t) := funcX(A, B, C, D, t)
y79(t) := funcY(A, B, C, D, t)
A := [x[17]; y2(x[17])]
B := [x[18]; y2(x[18])]
C := [x[19]; y2(x[19])]
D := [x[20]; y2(x[20])]
x710(t) := funcX(A, B, C, D, t)
y710(t) := funcY(A, B, C, D, t)
A := [x[18]; y2(x[18])]
B := [x[19]; y2(x[19])]
C := [x[20]; y2(x[20])]
D := [x[21]; y2(x[21])]
x711(t) := funcX(A, B, C, D, t)
y711(t) := funcY(A, B, C, D, t)
A := [x[19]; y2(x[19])]
B := [x[20]; y2(x[20])]
C := [x[21]; y2(x[21])]
D := [x[22]; y2(x[22])]
x712(t) := funcX(A, B, C, D, t)
y712(t) := funcY(A, B, C, D, t)
A := [x[20]; y2(x[20])]
B := [x[21]; y2(x[21])]
C := [x[22]; y2(x[22])]
D := [x[23]; y2(x[23])]
x713(t) := funcX(A, B, C, D, t)
y713(t) := funcY(A, B, C, D, t)
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