# Пример 7.1
N1 := 36
i1 := 0 .. N1 - 1  # РАБОТАЕТ
x1[i1] := cos(6*π*i1/N1)
y1[i1] := sin(6*π*i1/N1)
z1[i1] := 3*i1/N1
# [component: inputs (x1, y1, z1)]
# Пример 7.2
x2(t) := 5*cos(6*π*t)
y2(t) := 10*sin(6*π*t)
z2(t) := 10*t
P2(t) := [5*cos(6*π*t); 10*sin(6*π*t); 10*t]
ppp := CreateSpace(P2, -20, 20, 2000)
# [component: inputs ppp]
# РАБОТАЕТ
# Пример 7.3
Ft3(v) := [4*v - 5*v^2/8 + 5/8; 5*sin(2*v); (v + 1)*(v*3)]
Pt3(v) := [5*cos(6*π*v); 10*sin(6*π*v); 20*v]  # РАБОТАЕТ
CF3 := CreateSpace(Ft3, -100, 100, 2000)
CP3 := CreateSpace(Pt3, -10, 10, 2000)
# [component: inputs CF3, CP3]
# Пример 7.4
ORIGIN := 0
M := 50
i := 0 .. M
T[i] := i*8*π/M
k := 1
a0(v) := 1 - 3*v^2 + 2*v^3
a1(v) := 3*v^2 - 2*v^3
b0(v) := v - 2*v^2 + v^3
b1(v) := -v^2 + v^3
x(t) := cos(t)
y(t) := sin(t)
z(t) := k*t
px(t) := d/dt(x(t))
py(t) := d/dt(y(t))
pz(t) := d/dt(z(t))
# РАБОТАЕТ
X[i] := x(T[i])
Y[i] := y(T[i])
Z[i] := z(T[i])
pX[i] := px(T[i])
pY[i] := py(T[i])
pZ[i] := pz(T[i])
Ermit(t, T, A, dA) :=
    E ← 0
    for i ∈ 0 .. M - 1
        if T[i] ≤ t < T[i + 1]
            l[i] ← T[i + 1] - T[i]
            g ← (t - T[i])/l[i]
            E ← A[i]*a0(g) + A[i + 1]*a1(g) + dA[i]*b0(g)*l[i] + dA[i + 1]*b1(g)*l[i]
    E
ErX(t) := Ermit(t, T, X, pX)
ErY(t) := Ermit(t, T, Y, pY)
ErZ(t) := Ermit(t, T, Z, pZ)
F(t) := [ErX(t); ErY(t); ErZ(t)]
CS := CreateSpace(F, 0, 8*π, 200)
# [component: inputs CS]
# Пример 7.5
a0(v) := 1 - 3*v^2 + 2*v^3
a1(v) := 3*v^2 - 2*v^3
b0(v) := v - 2*v^2 + v^3
b1(v) := -v^2 + v^3
f(t) := [cos(t); sin(t); t]
df(t) := [d/dt(cos(t)); d/dt(sin(t)); d/dt(t)]
M := 50
i := 0 .. M
T[i] := i*8*π/M
R[i] := f(T[i])
dR[i] := df(T[i])
Ermit(t) :=
    E ← [0; 0; 0]
    for i ∈ 0 .. M - 1
        if T[i] ≤ t < T[i + 1]
            l[i] ← T[i + 1] - T[i]
            g ← (t - T[i])/l[i]
            E ← R[i]*a0(g) + R[i + 1]*a1(g) + dR[i]*b0(g)*l[i] + dR[i + 1]*b1(g)*l[i]
    E
ErX(t) := Ermit(t)
CS := CreateSpace(ErX, 0, 8*π, 200)
# [component: inputs CS]
# Пример 7.6
# РАБОТАЕТ
M := [
    1, 2, 3, 4, 4.5, 4, 3, 2, 1, 1;
    1.5, 2.5, 3.5, 5, 5.6, 5, 4, 3, 2, 1.5;
    3, 4, 5, 6, 6.7, 6, 5, 4, 3, 2;
    4, 4.5, 6, 7, 7.8, 7, 6, 5, 4, 3;
    4.6, 6, 7, 8, 8.5, 8, 7, 6, 5, 4;
    4.5, 5, 6, 6.7, 7.8, 7, 6, 5, 4, 3;
    3, 4, 5, 6, 6.7, 6, 5, 4, 3, 2;
    2.6, 3, 4, 5, 5.6, 5, 4, 3, 2, 1;
    1.8, 2.5, 3.6, 4.5, 5, 4.6, 3.3, 2.5, 1.5, 1;
    2, 3, 4, 5, 5.5, 5, 4, 3, 2, 1
]
# [component: inputs M]
# Пример 7.10
N := 25
i := 0 .. N
j := 0 .. N
R := 1
# РАБОТАЕТ
φ[i] := i*2*π/N
ζ[j] := j*2*π/N
x[i, j] := R*sin(ζ[j])*cos(φ[i])
y[i, j] := R*sin(ζ[j])*sin(φ[i])
z[i, j] := R*cos(ζ[j])
# [component: inputs (x, y, z)]
# Пример 7.11
S(u, v) := [cos(u)*cos(v); cos(u)*sin(v); sin(u)]  # РАБОТАЕТ
# [component: inputs CreateMesh(S, -π/2, π/2, 0, 2*π, 40, 40)]
# Пример 7.12
A := [1; 1; 0]
B := [7; -10; 0]
C := [10; 1; 9]
D := [-2; -11; 9]
(x - a)^2 + (y - b)^2 + (z - c)^2 - r^2 == 0
T1(x, y) := A
T2(x, y) := B
T3(x, y) := C
T4(x, y) := D
[
    (A[0] - a)^2 + (A[1] - b)^2 + (A[2] - c)^2 - r^2 == 0;
    (B[0] - a)^2 + (B[1] - b)^2 + (B[2] - c)^2 - r^2 == 0;
    (C[0] - a)^2 + (C[1] - b)^2 + (C[2] - c)^2 - r^2 == 0;
    (D[0] - a)^2 + (D[1] - b)^2 + (D[2] - c)^2 - r^2 == 0
] solve, a, b, c, r → [125/34, -159/34, 215/34, 3*sqrt(10195)/34; 125/34, -159/34, 215/34, -3*sqrt(10195)/34]
a := 125/34
b := -159/34
c := 215/34
r := 3*sqrt(10195)/34
N := 25
i := 0 .. N
j := 0 .. N
R := r
# РАБОТАЕТ
φ[i] := i*2*π/N
ζ[j] := j*2*π/N
x[i, j] := R*sin(ζ[j])*cos(φ[i]) + a
y[i, j] := R*sin(ζ[j])*sin(φ[i]) + b
z[i, j] := R*cos(ζ[j]) + c
# [component: inputs [((x, y, z), T1, T2, T3, T4), □, □, □, □]]
# Пример 7.13
N := 25
i := 0 .. N
j := 0 .. N
R := 1
φ[i] := i*2*π/N
ζ[j] := j*2*π/N
# РАБОТАЕТ
Sphere(ζ, φ) := [R*sin(ζ)*cos(φ); R*sin(ζ)*sin(φ); R*cos(ζ)]
# [component: inputs CreateMesh(Sphere, 0, π, 0, π, 10, 10)]
# Пример 7.14
s[1] := 4
s[2] := 5
H := 6
R := 4
h := 0 .. H
φ := 0 .. 2*π  # РАБОТАЕТ
Cy1(φ, h) := [R*cos(φ) + s[1]; R*sin(φ) + s[2]; h]
# [component: inputs CreateMesh(Cy1, 0, 2*π, 6, 20, 20)]
# Пример 7.15
H := 6
R := 4
h := 0 .. H
φ := 0 .. 2*π
# РАБОТАЕТ
Cy1(φ, h) := [R*cos(φ); R*sin(φ); h]
# [component: inputs CreateMesh(Cy1, 0, 2*π/3, 6, 20, 10)]
# Пример 7.17
S := [8; 4; 3]
r := 6
H := S[2]
h := 0 .. H
R := r
ζ := 0 .. 2*π
tg := R/H
# РАБОТАЕТ
Cone(ζ, h) := [(H - h)*tg*cos(ζ) + S[0]; (H - h)*tg*sin(ζ) + S[1]; h]
P1 := CreateMesh(Cone, 0, 2*π, 0, 4, 20, 10)
# [component: inputs P1]
# Пример 7.18
H := 4
φ := π/3
R := tan(φ)*H
h := 0 .. H
ζ := 0 .. 2*π
Cone(ζ, h) := [R*(H - h)/H*cos(ζ); R*(H - h)/H*sin(ζ); h]  # РАБОТАЕТ
P1 := CreateMesh(Cone, 0, π, 0, 4, 20, 10)
# [component: inputs P1]
