# Задание 2
x2(t) := t^2/(1 + t^3)
y2(t) := t/(1 + t^3)
z2(t) := 2/(3 - 5*t)
F2(t) := [t^2/(1 + t^3); t/(1 + t^3); 2/(3 - 5*t)]
C2 := CreateSpace(F2, -100, 100, 200)
# [component: inputs C2]
# Задание 3
A3 := 15
B3 := -17
C3 := 0
E3 := 16
Q3 := 8
G3 := -3
H3 := 9
J3 := 0
K3 := 8
D3 := 7
f3(x, y, z) := A3*x^2 + B3*y^2 + C3*z^2 + 2*E3*x*y + 2*G3*y*z + 2*H3*x + 2*J3*y + 2*K3*z + D3
A3*x^2 + B3*y^2 + C3*z^2 + 2*E3*x*y + 2*G3*y*z + 2*H3*x + 2*J3*y + 2*K3*z + D3 == 0 solve, z → (15*x^2 + 32*x*y + 18*x - 17*y^2 + 7)/(6*y - 16)
I3[1] := A3 + B3 + C3 = -2
I3[2] := det([A3, E3; E3, B3]) + det([B3, G3; G3, C3]) + det([A3, Q3; Q3, C3]) = -584
I3[3] := det([A3, E3, Q3; E3, B3, G3; Q3, G3, C3]) = 185
# Так как I_3 != 0, а так же I_2 <= 0 и I_4 > 0, то получаем поверхность - однополостный гиперболоид
I3[4] := det([A3, E3, Q3, H3; E3, B3, G3, J3; Q3, G3, C3, K3; H3, J3, K3, D3]) = 22056
# Задание 4
a4 := 4
b4 := 3
c4 := 2
nt := 20
nv := 16
i := 0 .. nt
j := 0 .. nv
t[i] := 2*π*i/nt
v[j] := j*2/nv
x4[i, j] := a4*v[j]*cos(t[i])
y4[i, j] := b4*v[j]
p4(t, v) := [a4*v*cos(t); b4*v; c4*v*sin(t)]
z4[i, j] := c4*v[j]*sin(t[i])
# [component: inputs (x4, y4, z4)]
# Задание 5
H := 25
R := 8
φ := 7*π/9
OSN := [2; 9; 19] = [2; 9; 19]
A := [8; 14; 8]
B := [7; 18; 18]
C := [8; 3; 1]
T1(x, y) := OSN
82*x - 7*y + 11*z - 646 solve, z → 7*y/11 - 82*x/11 + 646/11
Cyl(φ, h) := [h; R*sin(φ); R*cos(φ)]
det([
    x - A[0], y - A[1], z - A[2];
    B[0] - A[0], B[1] - A[1], B[2] - A[2];
    C[0] - A[0], C[1] - A[1], C[2] - A[2]
]) → 82*x - 7*y + 11*z - 646
z(x, y) := 7*y/11 - 82*x/11 + 646/11
P2 := CreateMesh(z, 4, 8, 18, 0)
ugolX := 81
ugolY := -5
ugolZ := 8
Ax(t) := [1, 0, 0; 0, cos(t), -sin(t); 0, sin(t), cos(t)]
Ay(t) := [cos(t), 0, sin(t); 0, 1, 0; -sin(t), 0, cos(t)]
Az(t) := [cos(t), -sin(t), 0; sin(t), cos(t), 0; 0, 0, 1]
nt := 40
nu := 10
i := 0 .. nt
j := 0 .. nu
ua := ugolX*deg
ub := ugolY*deg
uc := ugolZ*deg
t[i] := 2*π*i/nt
u[j] := j*4*π/nu
Cyl2(φ, h) := Ax(ua)*Ay(ub)*Az(uc)*Cyl(φ, h) + OSN
P1 := CreateMesh(Cyl2, 0, φ, 0, H, 20)
# [component: inputs P1, T1, P2]
