# Задание 2
# У точки D изменил координаты(бывшие (15,10)), не получался пятиугольник
A := [9; 16; 0]
B := [7; 15; 0]
C := [4; 15; 0]
D := [7; 5; 0]
E := [11; 3; 0]
T1(x, y) := A
T2(x, y) := B
T3(x, y) := C
T4(x, y) := D
T5(x, y) := E
lin1(t, u) := [A[0] + (B[0] - A[0])*t; A[1] + (B[1] - A[1])*t; A[2] + (B[2] - A[2])*t]
lin2(t, u) := [B[0] + (C[0] - B[0])*t; B[1] + (C[1] - B[1])*t; B[2] + (C[2] - B[2])*t]
lin3(t, u) := [C[0] + (D[0] - C[0])*t; C[1] + (D[1] - C[1])*t; C[2] + (D[2] - C[2])*t]
Cen := [(A[0] + E[0])/2; (A[1] + E[1])/2; 0] = [10; 9.5; 0]
T6(x, y) := Cen
φ := -9*π/20 .. 11*π/20
Radius := sqrt((E[0] - A[0])^2 + (E[1] - A[1])^2)/2 = 6.57647
Cyl(φ, h) := [Radius*cos(φ) + Cen[0]; Radius*sin(φ) + Cen[1]; 0]
Cy := CreateMesh(Cyl, -9*π/20, 11*π/20, 1, 1, 20)
lin4(t, u) := [D[0] + (E[0] - D[0])*t; D[1] + (E[1] - D[1])*t; D[2] + (E[2] - D[2])*t]
lin5(t, u) := [E[0] + (A[0] - E[0])*t; E[1] + (A[1] - E[1])*t; E[2] + (A[2] - E[2])*t]
P1 := CreateMesh(lin1, 0, 1, 0, 0)
P2 := CreateMesh(lin2, 0, 1, 0, 0)
P3 := CreateMesh(lin3, 0, 1, 0, 0)
P4 := CreateMesh(lin4, 0, 1, 0, 0)
P5 := CreateMesh(lin5, 0, 1, 0, 0)
# [component: inputs [(P1, P2, P3, P4, P5, T1, T2, T3, T4, T5, T6, Cy), □, □, □, □, □, □, □, □, □, □, □]]
# [component: inputs P1, P2, P3, P4, T1, T2, T3, T4, T5, Cy]
# Задание 3.a
A := [9; 16; 1]
B := [7; 15; 1]
C := [4; 15; 1]
D := [7; 5; 1]
E := [11; 3; 1]
ugol := -48.81
Usin := sin(ugol*π/180) = -0.75253
Ucos := cos(ugol*π/180) = 0.658558
Smesh := -9/7
Pr1 := [-2; -1; 0]
Pr2 := [5; 7; 0]
# Ось OY
y == 8/7*x + 9/7
T := ([1, 0, 0; 0, 1, 0; 0, Smesh, 1]*[Ucos, Usin, 0; -Usin, Ucos, 0; 0, 0, 1]*[1, 0, 0; 0, -1, 0; 0, 0, 1])*[Ucos, -Usin, 0; Usin, Ucos, 0; 0, 0, 1]*[1, 0, 0; 0, 1, 0; 0, -Smesh, 1] = [-0.132602, 0.991169, 0; 0.991169, 0.132602, 0; -1.27436, 1.11523, 1]
Pr(t, u) := [Pr1[0] + (Pr2[0] - Pr1[0])*t; Pr1[1] + (Pr2[1] - Pr1[1])*t; Pr1[2] + (Pr2[2] - Pr1[2])*t]
At := transpose(transpose(A)*T) = [13.3909; 12.1574; 1]
Ct := transpose(transpose(C)*T) = [13.0628; 7.06894; 1]
Et := transpose(transpose(E)*T) = [0.240521; 12.4159; 1]
Bt := transpose(transpose(B)*T) = [12.665; 10.0424; 1]
Dt := transpose(transpose(D)*T) = [2.75327; 8.71642; 1]
Cent := [(At[0] + Et[0])/2; (At[1] + Et[1])/2; 0] = [6.81572; 12.2866; 0]
P6 := CreateMesh(Pr, 0.7, 2.3, 0, 0)
lin1t(t, u) := [At[0] + (Bt[0] - At[0])*t; At[1] + (Bt[1] - At[1])*t; At[2] + (Bt[2] - At[2])*t]
lin2t(t, u) := [Bt[0] + (Ct[0] - Bt[0])*t; Bt[1] + (Ct[1] - Bt[1])*t; Bt[2] + (Ct[2] - Bt[2])*t]
lin3t(t, u) := [Ct[0] + (Dt[0] - Ct[0])*t; Ct[1] + (Dt[1] - Ct[1])*t; Ct[2] + (Dt[2] - Ct[2])*t]
lin4t(t, u) := [Dt[0] + (Et[0] - Dt[0])*t; Dt[1] + (Et[1] - Dt[1])*t; Dt[2] + (Et[2] - Dt[2])*t]
Cylt(φ, h) := [Radius*cos(φ) + Cent[0]; Radius*sin(φ) + Cent[1]; 0]
Cyt := CreateMesh(Cylt, 0, π, 1, 1, 20)
# [component: inputs P1, P2, P3, P4, P6, T1, T2, T3, T4, T5, T6, Cy]
P1t := CreateMesh(lin1t, 0, 1, 0, 0)
P2t := CreateMesh(lin2t, 0, 1, 0, 0)
P3t := CreateMesh(lin3t, 0, 1, 0, 0)
P4t := CreateMesh(lin4t, 0, 1, 0, 0)
# [component: inputs P1, P2, P3, P4, Cy, T1, T2, T3, T4, T5, P1t, P2t, P3t, P4t, Cyt, P6]
# Задание 3.б
ugol := 75
S := [-2; -1; 0]
Usin := sin(ugol*π/180) = 0.965926
Ucos := cos(ugol*π/180) = 0.258819
R := [Ucos, Usin, S[0]; -Usin, Ucos, S[1]; S[0], S[1], 1]
Ar := transpose(transpose(A)*R) = [-15.1254; 11.8344; -33]
Cr := transpose(transpose(C)*R) = [-15.4536; 6.74599; -22]
Er := transpose(transpose(E)*R) = [-2.05077; 10.4016; -24]
Br := transpose(transpose(B)*R) = [-14.6772; 9.64377; -28]
Dr := transpose(transpose(D)*R) = [-5.0179; 7.05558; -18]
Cenr := [(Ar[0] + Er[0])/2; (Ar[1] + Er[1])/2; 0] = [-8.5881; 11.118; 0]
lin1r(t, u) := [Ar[0] + (Br[0] - Ar[0])*t; Ar[1] + (Br[1] - Ar[1])*t; Ar[2] + (Br[2] - Ar[2])*t]
lin2r(t, u) := [Br[0] + (Cr[0] - Br[0])*t; Br[1] + (Cr[1] - Br[1])*t; Br[2] + (Cr[2] - Br[2])*t]
lin3r(t, u) := [Cr[0] + (Dr[0] - Cr[0])*t; Cr[1] + (Dr[1] - Cr[1])*t; Cr[2] + (Dr[2] - Cr[2])*t]
lin4r(t, u) := [Dr[0] + (Er[0] - Dr[0])*t; Dr[1] + (Er[1] - Dr[1])*t; Dr[2] + (Er[2] - Dr[2])*t]
Cylr(φ, h) := [Radius*cos(φ) + Cenr[0]; Radius*sin(φ) + Cenr[1]; 1]
Cyr := CreateMesh(Cylr, -2*π/40, 39*π/40, 1, 1, 20)
P1r := CreateMesh(lin1r, 0, 1, 0, 0)
P2r := CreateMesh(lin2r, 0, 1, 0, 0)
P3r := CreateMesh(lin3r, 0, 1, 0, 0)
P4r := CreateMesh(lin4r, 0, 1, 0, 0)
# [component: inputs P1, P2, P3, P4, T1, T2, T3, T4, T5, Cy, P1r, P2r, P3r, P4r, Cyr]
# Задание 3.в
Mn := [1.5; 1.2]
M := [Mn[0], 0, 0; 0, Mn[1], 0; 0, 0, 1]
Am := transpose(transpose(A)*M) = [13.5; 19.2; 1]
Cm := transpose(transpose(C)*M) = [6; 18; 1]
Em := transpose(transpose(E)*M) = [16.5; 3.6; 1]
Bm := transpose(transpose(B)*M) = [10.5; 18; 1]
Dm := transpose(transpose(D)*M) = [10.5; 6; 1]
Cenm := [(Am[0] + Em[0])/2; (Am[1] + Em[1])/2; 0] = [15; 11.4; 0]
Radiusm := sqrt((Em[0] - Am[0])^2 + (Em[1] - Am[1])^2)/2
lin1m(t, u) := [Am[0] + (Bm[0] - Am[0])*t; Am[1] + (Bm[1] - Am[1])*t; Am[2] + (Bm[2] - Am[2])*t]
lin2m(t, u) := [Bm[0] + (Cm[0] - Bm[0])*t; Bm[1] + (Cm[1] - Bm[1])*t; Bm[2] + (Cm[2] - Bm[2])*t]
lin3m(t, u) := [Cm[0] + (Dm[0] - Cm[0])*t; Cm[1] + (Dm[1] - Cm[1])*t; Cm[2] + (Dm[2] - Cm[2])*t]
lin4m(t, u) := [Dm[0] + (Em[0] - Dm[0])*t; Dm[1] + (Em[1] - Dm[1])*t; Dm[2] + (Em[2] - Dm[2])*t]
Cylm(φ, h) := [Radiusm*cos(φ) + Cenm[0]; Radiusm*sin(φ) + Cenm[1]; 1]
Cym := CreateMesh(Cylm, -18*π/40, 23*π/40, 1, 1, 20)
P1m := CreateMesh(lin1m, 0, 1, 0, 0)
P2m := CreateMesh(lin2m, 0, 1, 0, 0)
P3m := CreateMesh(lin3m, 0, 1, 0, 0)
P4m := CreateMesh(lin4m, 0, 1, 0, 0)
# [component: inputs P1, P2, P3, P4, T1, T2, T3, T4, T5, Cy, P1m, P2m, P3m, P4m, Cym]
# Задание 3.г
Pd := [20; -15]
P := [1, 0, 0; 0, 1, 0; Pd[0], Pd[1], 1]
Ap := transpose(transpose(A)*P) = [29; 1; 1]
Cp := transpose(transpose(C)*P) = [24; 0; 1]
Ep := transpose(transpose(E)*P) = [31; -12; 1]
Bp := transpose(transpose(B)*P) = [27; 0; 1]
Dp := transpose(transpose(D)*P) = [27; -10; 1]
Cenp := [(Ap[0] + Ep[0])/2; (Ap[1] + Ep[1])/2; 0] = [30; -5.5; 0]
lin1p(t, u) := [Ap[0] + (Bp[0] - Ap[0])*t; Ap[1] + (Bp[1] - Ap[1])*t; Ap[2] + (Bp[2] - Ap[2])*t]
lin2p(t, u) := [Bp[0] + (Cp[0] - Bp[0])*t; Bp[1] + (Cp[1] - Bp[1])*t; Bp[2] + (Cp[2] - Bp[2])*t]
lin3p(t, u) := [Cp[0] + (Dp[0] - Cp[0])*t; Cp[1] + (Dp[1] - Cp[1])*t; Cp[2] + (Dp[2] - Cp[2])*t]
lin4p(t, u) := [Dp[0] + (Ep[0] - Dp[0])*t; Dp[1] + (Ep[1] - Dp[1])*t; Dp[2] + (Ep[2] - Dp[2])*t]
Cylp(φ, h) := [Radius*cos(φ) + Cenp[0]; Radius*sin(φ) + Cenp[1]; 1]
Cyp := CreateMesh(Cylp, -9*π/20, 11*π/20, 1, 1, 20)
P1p := CreateMesh(lin1p, 0, 1, 0, 0)
P2p := CreateMesh(lin2p, 0, 1, 0, 0)
P3p := CreateMesh(lin3p, 0, 1, 0, 0)
P4p := CreateMesh(lin4p, 0, 1, 0, 0)
# [component: inputs P1, P2, P3, P4, T1, T2, T3, T4, T5, Cy, P1p, P2p, P3p, P4p, Cyp]
# Задание 4
Rotate := [17; 21; π/4]
Transfer := [-15; -15]
Scaling := [1.2; 2]
# |-------------------------------------Поворот-------------------------------------|
# |-----------------------Перенос-----------------------|
# |----------------------Перенос----------------------|
Usin := sin(Rotate[2]) = 0.707107
Ucos := cos(Rotate[2]) = 0.707107
TransferM := [1, 0, 0; 0, 1, 0; Transfer[0], Transfer[1], 1]
ScaleM := [Scaling[0], 0, 0; 0, Scaling[1], 0; 0, 0, 1] = [1.2, 0, 0; 0, 2, 0; 0, 0, 1]
RotateM := [1, 0, 0; 0, 1, 0; -Rotate[0], -Rotate[1], 1]*[Ucos, Usin, 0; -Usin, Ucos, 0; 0, 0, 1]*[1, 0, 0; 0, 1, 0; Rotate[0], Rotate[1], 1] = [0.707107, 0.707107, 0; -0.707107, 0.707107, 0; 19.8284, -5.87006, 1]
Matrix := RotateM*TransferM*ScaleM = [0.848528, 1.41421, 0; -0.848528, 1.41421, 0; 5.79411, -41.7401, 1]  # - общая матрица преобразований
A4 := transpose(transpose(A)*Matrix) = [-0.145584; -6.38478; 1]
C4 := transpose(transpose(C)*Matrix) = [-3.5397; -14.8701; 1]
E4 := transpose(transpose(E)*Matrix) = [12.5823; -21.9411; 1]
B4 := transpose(transpose(B)*Matrix) = [-0.994113; -10.6274; 1]
D4 := transpose(transpose(D)*Matrix) = [7.49117; -24.7696; 1]
Cen4 := [(A4[0] + E4[0])/2; (A4[1] + E4[1])/2; 0] = [6.21838; -14.163; 0]
Radius4 := sqrt((E4[0] - A4[0])^2 + (E4[1] - A4[1])^2)/2
lin14(t, u) := [A4[0] + (B4[0] - A4[0])*t; A4[1] + (B4[1] - A4[1])*t; A4[2] + (B4[2] - A4[2])*t]
lin24(t, u) := [B4[0] + (C4[0] - B4[0])*t; B4[1] + (C4[1] - B4[1])*t; B4[2] + (C4[2] - B4[2])*t]
lin34(t, u) := [C4[0] + (D4[0] - C4[0])*t; C4[1] + (D4[1] - C4[1])*t; C4[2] + (D4[2] - C4[2])*t]
lin44(t, u) := [D4[0] + (E4[0] - D4[0])*t; D4[1] + (E4[1] - D4[1])*t; D4[2] + (E4[2] - D4[2])*t]
Cyl4(φ, h) := [Radius4*cos(φ) + Cen4[0]; Radius4*sin(φ) + Cen4[1]; 1]
Cy4 := CreateMesh(Cyl4, -6*π/20, 29*π/40, 1, 1, 20)
P14 := CreateMesh(lin14, 0, 1, 0, 0)
P24 := CreateMesh(lin24, 0, 1, 0, 0)
P34 := CreateMesh(lin34, 0, 1, 0, 0)
P44 := CreateMesh(lin44, 0, 1, 0, 0)
# [component: inputs [(P1, P2, P3, P4, T1, T2, T3, T4, T5, Cy, P14, P24, P34, P44, Cy4), □, □, □, □, □, □, □, □, □, □, □, □, □, □]]
# Задание 5
AniCenter(f) :=
    AA ← A
    EE ← E
    return [(A[0] + E[0])/2; (A[1] + E[1])/2; 0] if f == 0
    if f == 1
        AA ← transpose(transpose(AA)*RotateM)
        EE ← transpose(transpose(EE)*RotateM)
        return [(AA[0] + EE[0])/2; (AA[1] + EE[1])/2; 0]
    if f == 2
        AA ← transpose(transpose(AA)*RotateM*TransferM)
        EE ← transpose(transpose(EE)*RotateM*TransferM)
        return [(AA[0] + EE[0])/2; (AA[1] + EE[1])/2; 0]
    if f == 3
        AA ← transpose(transpose(AA)*RotateM*TransferM*ScaleM)
        EE ← transpose(transpose(EE)*RotateM*TransferM*ScaleM)
        return [(AA[0] + EE[0])/2; (AA[1] + EE[1])/2; 0]
AniLine1(f, AA, BB, t) :=
    A ← AA
    B ← BB
    return [A[0] + (B[0] - A[0])*t; A[1] + (B[1] - A[1])*t; A[2] + (B[2] - A[2])*t] if f == 0
    if f == 1
        A ← transpose(transpose(A)*RotateM)
        B ← transpose(transpose(B)*RotateM)
        return [A[0] + (B[0] - A[0])*t; A[1] + (B[1] - A[1])*t; A[2] + (B[2] - A[2])*t]
    if f == 2
        A ← transpose(transpose(A)*RotateM*TransferM)
        B ← transpose(transpose(B)*RotateM*TransferM)
        return [A[0] + (B[0] - A[0])*t; A[1] + (B[1] - A[1])*t; A[2] + (B[2] - A[2])*t]
    if f == 3
        A ← transpose(transpose(A)*RotateM*TransferM*ScaleM)
        B ← transpose(transpose(B)*RotateM*TransferM*ScaleM)
        return [A[0] + (B[0] - A[0])*t; A[1] + (B[1] - A[1])*t; A[2] + (B[2] - A[2])*t]
AniRadius(f) :=
    rad ← sqrt((E[0] - A[0])^2 + (E[1] - A[1])^2)/2
    if f == 3
        A ← transpose(transpose(A)*RotateM*TransferM*ScaleM)
        E ← transpose(transpose(E)*RotateM*TransferM*ScaleM)
        rad ← sqrt((E[0] - A[0])^2 + (E[1] - A[1])^2)/2
    rad
AniUgol(f) :=
    return [-9*π/20; 11*π/20] if f == 0
    return [-4*π/20; 16*π/20] if f == 1
    return [-4*π/20; 16*π/20] if f == 2
    return [-11*π/40; 29*π/40] if f == 3
AniDuga(f, φ, h) := [AniRadius(f)*cos(φ) + AniCenter(f)[0]; AniRadius(f)*sin(φ) + AniCenter(f)[1]; 1]
Cy5 := CreateMesh(AniDuga(FRAME), AniUgol(FRAME)[0], AniUgol(FRAME)[1], 1, 1, 20)
lin15(t, u) := AniLine1(FRAME, A, B, t)
lin25(t, u) := AniLine1(FRAME, B, C, t)
lin35(t, u) := AniLine1(FRAME, C, D, t)
lin45(t, u) := AniLine1(FRAME, D, E, t)
P15 := CreateMesh(lin15, 0, 1, 0, 0)
P25 := CreateMesh(lin25, 0, 1, 0, 0)
P35 := CreateMesh(lin35, 0, 1, 0, 0)
P45 := CreateMesh(lin45, 0, 1, 0, 0)
# [component: inputs [(P15, P25, P35, P45, Cy5), □, □, □, □]]
