# Задание 2
A := [1; 13; 2]
B := [13; 2; 5]
C := [2; 5; 12]
D := [5; 12; 8]
E := [12; 8; 18]
F := [8; 18; 15]
M := [
    A[0], A[1], A[2], 1;
    B[0], B[1], B[2], 1;
    C[0], C[1], C[2], 1;
    D[0], D[1], D[2], 1;
    E[0], E[1], E[2], 1;
    F[0], F[1], F[2], 1
]
X := [M[2, 0], M[0, 0], M[5, 0], M[4, 0], M[3, 0], M[0, 0], M[1, 0], M[0, 0], M[4, 0], M[5, 0], M[0, 0], M[2, 0], M[0, 0], M[4, 0], M[3, 0], M[1, 0], M[0, 0], M[4, 0], M[3, 0], M[1, 0], M[2, 0]]
Y := [M[2, 1], M[0, 1], M[5, 1], M[4, 1], M[3, 1], M[0, 1], M[1, 1], M[0, 1], M[4, 1], M[5, 1], M[0, 1], M[2, 1], M[0, 1], M[4, 1], M[3, 1], M[1, 1], M[0, 1], M[4, 1], M[3, 1], M[1, 1], M[2, 1]]
Z := [M[2, 2], M[0, 2], M[5, 2], M[4, 2], M[3, 2], M[0, 2], M[1, 2], M[0, 2], M[4, 2], M[5, 2], M[0, 2], M[2, 2], M[0, 2], M[4, 2], M[3, 2], M[1, 2], M[0, 2], M[4, 2], M[3, 2], M[1, 2], M[2, 2]]
K2 := transpose([X, Y, Z])
# [component: inputs K2]
M4 := M
# Задание 3
# Ось Z
ugol := π
perenX := 0
perenY := 10
perenZ := 0
mashX := 1
mashY := 0.5
mashZ := 1  # Плоскость XoZ
Povorot := [cos(ugol), sin(ugol), 0, 0; -sin(ugol), cos(ugol), 0, 0; 0, 0, 1, 0; 0, 0, 0, 1]
Perenos := [1, 0, 0, 0; 0, 1, 0, 0; 0, 0, 1, 0; perenX, perenY, perenZ, 1]
Mashtab := [mashX, 0, 0, 0; 0, mashY, 0, 0; 0, 0, mashZ, 0; 0, 0, 0, 1]
Otrazh := [1, 0, 0, 0; 0, -1, 0, 0; 0, 0, 1, 0; 0, 0, 0, 1]
M := M*Perenos
X := [M[2, 0], M[0, 0], M[5, 0], M[4, 0], M[3, 0], M[0, 0], M[1, 0], M[0, 0], M[4, 0], M[5, 0], M[0, 0], M[2, 0], M[0, 0], M[4, 0], M[3, 0], M[1, 0], M[0, 0], M[4, 0], M[3, 0], M[1, 0], M[2, 0]]
Y := [M[2, 1], M[0, 1], M[5, 1], M[4, 1], M[3, 1], M[0, 1], M[1, 1], M[0, 1], M[4, 1], M[5, 1], M[0, 1], M[2, 1], M[0, 1], M[4, 1], M[3, 1], M[1, 1], M[0, 1], M[4, 1], M[3, 1], M[1, 1], M[2, 1]]
Z := [M[2, 2], M[0, 2], M[5, 2], M[4, 2], M[3, 2], M[0, 2], M[1, 2], M[0, 2], M[4, 2], M[5, 2], M[0, 2], M[2, 2], M[0, 2], M[4, 2], M[3, 2], M[1, 2], M[0, 2], M[4, 2], M[3, 2], M[1, 2], M[2, 2]]
K31 := transpose([X, Y, Z])
M := M*Mashtab
X := [M[2, 0], M[0, 0], M[5, 0], M[4, 0], M[3, 0], M[0, 0], M[1, 0], M[0, 0], M[4, 0], M[5, 0], M[0, 0], M[2, 0], M[0, 0], M[4, 0], M[3, 0], M[1, 0], M[0, 0], M[4, 0], M[3, 0], M[1, 0], M[2, 0]]
Y := [M[2, 1], M[0, 1], M[5, 1], M[4, 1], M[3, 1], M[0, 1], M[1, 1], M[0, 1], M[4, 1], M[5, 1], M[0, 1], M[2, 1], M[0, 1], M[4, 1], M[3, 1], M[1, 1], M[0, 1], M[4, 1], M[3, 1], M[1, 1], M[2, 1]]
Z := [M[2, 2], M[0, 2], M[5, 2], M[4, 2], M[3, 2], M[0, 2], M[1, 2], M[0, 2], M[4, 2], M[5, 2], M[0, 2], M[2, 2], M[0, 2], M[4, 2], M[3, 2], M[1, 2], M[0, 2], M[4, 2], M[3, 2], M[1, 2], M[2, 2]]
K32 := transpose([X, Y, Z])
M := M*Otrazh
X := [M[2, 0], M[0, 0], M[5, 0], M[4, 0], M[3, 0], M[0, 0], M[1, 0], M[0, 0], M[4, 0], M[5, 0], M[0, 0], M[2, 0], M[0, 0], M[4, 0], M[3, 0], M[1, 0], M[0, 0], M[4, 0], M[3, 0], M[1, 0], M[2, 0]]
Y := [M[2, 1], M[0, 1], M[5, 1], M[4, 1], M[3, 1], M[0, 1], M[1, 1], M[0, 1], M[4, 1], M[5, 1], M[0, 1], M[2, 1], M[0, 1], M[4, 1], M[3, 1], M[1, 1], M[0, 1], M[4, 1], M[3, 1], M[1, 1], M[2, 1]]
Z := [M[2, 2], M[0, 2], M[5, 2], M[4, 2], M[3, 2], M[0, 2], M[1, 2], M[0, 2], M[4, 2], M[5, 2], M[0, 2], M[2, 2], M[0, 2], M[4, 2], M[3, 2], M[1, 2], M[0, 2], M[4, 2], M[3, 2], M[1, 2], M[2, 2]]
K33 := transpose([X, Y, Z])
M := M*Povorot
X := [M[2, 0], M[0, 0], M[5, 0], M[4, 0], M[3, 0], M[0, 0], M[1, 0], M[0, 0], M[4, 0], M[5, 0], M[0, 0], M[2, 0], M[0, 0], M[4, 0], M[3, 0], M[1, 0], M[0, 0], M[4, 0], M[3, 0], M[1, 0], M[2, 0]]
Y := [M[2, 1], M[0, 1], M[5, 1], M[4, 1], M[3, 1], M[0, 1], M[1, 1], M[0, 1], M[4, 1], M[5, 1], M[0, 1], M[2, 1], M[0, 1], M[4, 1], M[3, 1], M[1, 1], M[0, 1], M[4, 1], M[3, 1], M[1, 1], M[2, 1]]
Z := [M[2, 2], M[0, 2], M[5, 2], M[4, 2], M[3, 2], M[0, 2], M[1, 2], M[0, 2], M[4, 2], M[5, 2], M[0, 2], M[2, 2], M[0, 2], M[4, 2], M[3, 2], M[1, 2], M[0, 2], M[4, 2], M[3, 2], M[1, 2], M[2, 2]]
K34 := transpose([X, Y, Z])
# [component: inputs K2, K31, K32, K33, K34]
# Задание 4
M := M4
Matrix := Otrazh*Povorot*Mashtab*Perenos
M := M*Matrix
X := [M[2, 0], M[0, 0], M[5, 0], M[4, 0], M[3, 0], M[0, 0], M[1, 0], M[0, 0], M[4, 0], M[5, 0], M[0, 0], M[2, 0], M[0, 0], M[4, 0], M[3, 0], M[1, 0], M[0, 0], M[4, 0], M[3, 0], M[1, 0], M[2, 0]]
Y := [M[2, 1], M[0, 1], M[5, 1], M[4, 1], M[3, 1], M[0, 1], M[1, 1], M[0, 1], M[4, 1], M[5, 1], M[0, 1], M[2, 1], M[0, 1], M[4, 1], M[3, 1], M[1, 1], M[0, 1], M[4, 1], M[3, 1], M[1, 1], M[2, 1]]
Z := [M[2, 2], M[0, 2], M[5, 2], M[4, 2], M[3, 2], M[0, 2], M[1, 2], M[0, 2], M[4, 2], M[5, 2], M[0, 2], M[2, 2], M[0, 2], M[4, 2], M[3, 2], M[1, 2], M[0, 2], M[4, 2], M[3, 2], M[1, 2], M[2, 2]]
K4 := transpose([X, Y, Z])
# [component: inputs K2, K4]
